// SBML level 2 version 4
// This model was downloaded from BioModels Database
// http://www.ebi.ac.uk/biomodels/

model Schilling2009_ERK_distributive()
  // Schilling2009 - ERK distributive
  // This model has been exported from PottersWheel on 2009-04-20 18:57:44. The PottersWheel Model Definition file can be obtained from the curation tab.
  // This model is described in the article:
  // Theoretical and experimental analysis links isoform-specific ERK signalling to cell fate decisions.
  // Schilling M, Maiwald T, Hengl S, Winter D, Kreutz C, Kolch W, Lehmann WD, Timmer J, Klingmüller U.
  // Mol. Syst. Biol. 2009; 5: 334
  // Abstract:
  // Cell fate decisions are regulated by the coordinated activation of signalling pathways such as the extracellular signal-regulated kinase (ERK) cascade, but contributions of individual kinase isoforms are mostly unknown. By combining quantitative data from erythropoietin-induced pathway activation in primary erythroid progenitor (colony-forming unit erythroid stage, CFU-E) cells with mathematical modelling, we predicted and experimentally confirmed a distributive ERK phosphorylation mechanism in CFU-E cells. Model analysis showed bow-tie-shaped signal processing and inherently transient signalling for cytokine-induced ERK signalling. Sensitivity analysis predicted that, through a feedback-mediated process, increasing one ERK isoform reduces activation of the other isoform, which was verified by protein over-expression. We calculated ERK activation for biochemically not addressable but physiologically relevant ligand concentrations showing that double-phosphorylated ERK1 attenuates proliferation beyond a certain activation level, whereas activated ERK2 enhances proliferation with saturation kinetics. Thus, we provide a quantitative link between earlier unobservable signalling dynamics and cell fate decisions.
  // This model is hosted on BioModels Database and identified by: BIOMD0000000270.
  // To cite BioModels Database, please use: BioModels Database: An enhanced, curated and annotated resource for published quantitative kinetic models.
  // To the extent possible under law, all copyright and related or neighbouring rights to this encoded model have been dedicated to the public domain worldwide. Please refer to CC0 Public Domain Dedication for more information.
  // biomodels.db:MODEL1001120000
  // biomodels.db:BIOMD0000000270
  // isDescribedBy pubmed:20029368
  // hasVersion kegg.pathway:mmu04630 kegg.pathway:mmu04010
  // hasVersion GO:0019221 GO:0004900 GO:0000165
  // hasTaxon taxonomy:10090

  // Compartments:
  compartment cell = 1;  // isVersionOf GO:0005623; isVersionOf FMA:83517

  // Species:
  species JAK2 in cell = 2;  // isVersionOf uniprot:Q62120
  species EpoR in cell = 1;  // isVersionOf uniprot:P14753
  species SHP1 in cell = 10.7991;  // isVersionOf interpro:IPR000387; isVersionOf uniprot:P29351
  species SOS in cell = 2.5101;  // hasVersion uniprot:Q62245
  species Raf in cell = 3.7719;  // isVersionOf uniprot:Q99N57
  species MEK2 in cell = 11;  // isVersionOf uniprot:Q63932
  species MEK1 in cell = 24;  // isVersionOf uniprot:P31938
  species ERK1 in cell = 7;  // isVersionOf uniprot:Q63844
  species ERK2 in cell = 21;  // isVersionOf uniprot:P63085
  species pJAK2 in cell = 0;  // hasVersion MOD:00048; isVersionOf kegg.compound:C00562; isHomologTo reactome:REACT_24029; hasProperty GO:0004713
  species pEpoR in cell = 0;  // isVersionOf kegg.compound:C00562; isVersionOf uniprot:P14753; hasVersion MOD:00048
  species mSHP1 in cell = 0;  // isVersionOf uniprot:P29351; hasProperty GO:0019897
  species actSHP1 in cell = 0;  // isVersionOf uniprot:P29351; hasProperty GO:0004725
  species mSOS in cell = 0;  // isVersionOf uniprot:Q62245; hasProperty GO:0019897; hasProperty GO:0005085
  species pRaf in cell = 0;  // isVersionOf uniprot:Q99N57; isVersionOf kegg.compound:C00562; hasVersion MOD:00046; isHomologTo reactome:REACT_3158
  species ppMEK2 in cell = 0;  // isVersionOf kegg.compound:C00562; isVersionOf uniprot:Q63932; hasVersion MOD:00048 MOD:00047; hasProperty GO:0004709
  species ppMEK1 in cell = 0;  // hasPart MOD:00048 MOD:00047; hasProperty GO:0004709; isVersionOf kegg.compound:C00562; isVersionOf uniprot:P31938
  species ppERK1 in cell = 0;  // hasPart MOD:00047 MOD:00048; isVersionOf kegg.compound:C00562; hasProperty GO:0004707; isVersionOf uniprot:Q63844
  species ppERK2 in cell = 0;  // hasPart MOD:00047 MOD:00048; isVersionOf uniprot:P63085; hasProperty GO:0004707; isVersionOf kegg.compound:C00562
  species pSOS in cell = 0;  // isVersionOf uniprot:Q62245; isVersionOf kegg.compound:C00562
  species pMEK2 in cell = 0;  // isVersionOf kegg.compound:C00562; isVersionOf uniprot:Q63932
  species pMEK1 in cell = 0;  // isVersionOf kegg.compound:C00562; isVersionOf uniprot:P31938
  species pERK1 in cell = 0;  // hasPart MOD:00048; isVersionOf uniprot:Q63844; isVersionOf kegg.compound:C00562
  species pERK2 in cell = 0;  // hasPart MOD:00048; isVersionOf kegg.compound:C00562; isVersionOf uniprot:P63085
  species Delay01_mSHP1 in cell = 0;  // isVersionOf uniprot:P29351
  species Delay02_mSHP1 in cell = 0;  // isVersionOf uniprot:P29351
  species Delay03_mSHP1 in cell = 0;  // isVersionOf uniprot:P29351
  species Delay04_mSHP1 in cell = 0;  // isVersionOf uniprot:P29351
  species Delay05_mSHP1 in cell = 0;  // isVersionOf uniprot:P29351
  species Delay06_mSHP1 in cell = 0;  // isVersionOf uniprot:P29351
  species Delay07_mSHP1 in cell = 0;  // hasVersion uniprot:P29351
  species Delay08_mSHP1 in cell = 0;  // isVersionOf uniprot:P29351
  species Epo in cell = 50;  // substance in U; isVersionOf uniprot:P07321; hasProperty GO:0005128

  // Parameters:
  JAK2_phosphorylation_by_Epo = 0.0122149 ml_per_min_per_U;
  EpoR_phosphorylation_by_pJAK2 = 3.15714 sec_ord;
  SHP1_activation_by_pEpoR = 0.408408 sec_ord;
  SHP1_delay = 0.408408 per_min;
  actSHP1_deactivation = 0.0248773 per_min;
  pEpoR_dephosphorylation_by_actSHP1 = 1.19995 sec_ord;
  pJAK2_dephosphorylation_by_actSHP1 = 0.368384 sec_ord;
  SOS_recruitment_by_pEpoR = 0.10271 sec_ord;
  mSOS_release_from_membrane = 15.5956 per_min;
  mSOS_induced_Raf_phosphorylation = 0.144515 sec_ord;
  pRaf_dephosphorylation = 0.374228 per_min;
  First_MEK2_phosphorylation_by_pRaf = 3.11919 sec_ord;
  Second_MEK2_phosphorylation_by_pRaf = 215.158 sec_ord;
  First_MEK1_phosphorylation_by_pRaf = 0.687193 sec_ord;
  Second_MEK1_phosphorylation_by_pRaf = 667.957 sec_ord;
  First_MEK_dephosphorylation = 0.130937 per_min;
  Second_MEK_dephosphorylation = 0.0732724 per_min;
  First_ERK1_phosphorylation_by_ppMEK = 2.4927 sec_ord;
  Second_ERK1_phosphorylation_by_ppMEK = 59.5251 sec_ord;
  First_ERK2_phosphorylation_by_ppMEK = 2.44361 sec_ord;
  Second_ERK2_phosphorylation_by_ppMEK = 53.0816 sec_ord;
  First_ERK_dephosphorylation = 39.0886 per_min;
  Second_ERK_dephosphorylation = 3.00453 per_min;
  ppERK_neg_feedback_on_mSOS = 5122.68 sec_ord;
  pSOS_dephosphorylation = 0.124944 per_min;
  scale_pEpoR = 0.493312 au_per_molec;
  scale_pJAK2 = 0.21008 au_per_molec;
  scale_ppERK = 13.5981 au_per_molec;
  scale_SOS = 1.10228 au_per_molec;
  scale_ppMEK = 40.5364 au_per_molec;
  rescaled_pEpoR has au;
  rescaled_ppMEK1 has au;
  rescaled_ppMEK2 has au;
  rescaled_ppERK1 has au;
  rescaled_ppERK2 has au;
  rescaled_pJAK2 has au;
  rescaled_pSOS has au;
  rescaled_SOS has au;
  rescaled_mSOS has au;

  // Assignment rules:
  rescaled_pEpoR := scale_pEpoR*pEpoR;
  rescaled_pJAK2 := scale_pJAK2*pJAK2;
  rescaled_ppERK1 := scale_ppERK*ppERK1;
  rescaled_ppERK2 := scale_ppERK*ppERK2;
  rescaled_ppMEK1 := scale_ppMEK*ppMEK1;
  rescaled_ppMEK2 := scale_ppMEK*ppMEK2;
  rescaled_pSOS := scale_SOS*pSOS;
  rescaled_SOS := scale_SOS*SOS;
  rescaled_mSOS := scale_SOS*mSOS;

  // Reactions:
  reaction_1: JAK2 => pJAK2; JAK2_phosphorylation_by_Epo*JAK2*Epo*cell;  // modifiers: Epo; isVersionOf ec-code:2.7.10.2; isVersionOf GO:0010535 GO:0004715; isHomologTo reactome:REACT_23935.1
  reaction_2: EpoR => pEpoR; EpoR_phosphorylation_by_pJAK2*EpoR*pJAK2*cell;  // modifiers: pJAK2; isVersionOf GO:0004715; isVersionOf ec-code:2.7.10.2
  reaction_3: SHP1 => mSHP1; SHP1_activation_by_pEpoR*SHP1*pEpoR*cell;  // modifiers: pEpoR; isVersionOf GO:0006461 GO:0051668
  reaction_4: mSHP1 => Delay01_mSHP1; SHP1_delay*mSHP1*cell;
  reaction_5: Delay01_mSHP1 => Delay02_mSHP1; SHP1_delay*Delay01_mSHP1*cell;
  reaction_6: Delay02_mSHP1 => Delay03_mSHP1; SHP1_delay*Delay02_mSHP1*cell;
  reaction_7: Delay03_mSHP1 => Delay04_mSHP1; SHP1_delay*Delay03_mSHP1*cell;
  reaction_8: Delay04_mSHP1 => Delay05_mSHP1; SHP1_delay*Delay04_mSHP1*cell;
  reaction_9: Delay05_mSHP1 => Delay06_mSHP1; SHP1_delay*Delay05_mSHP1*cell;
  reaction_10: Delay06_mSHP1 => Delay07_mSHP1; SHP1_delay*Delay06_mSHP1*cell;
  reaction_11: Delay07_mSHP1 => Delay08_mSHP1; SHP1_delay*Delay07_mSHP1*cell;
  reaction_12: Delay08_mSHP1 => actSHP1; SHP1_delay*Delay08_mSHP1*cell;
  reaction_13: actSHP1 => SHP1; actSHP1_deactivation*actSHP1*cell;
  reaction_14: pEpoR => EpoR; pEpoR_dephosphorylation_by_actSHP1*pEpoR*actSHP1*cell;  // modifiers: actSHP1; isVersionOf ec-code:3.1.3.48; isVersionOf GO:0004725
  reaction_15: pJAK2 => JAK2; pJAK2_dephosphorylation_by_actSHP1*pJAK2*actSHP1*cell;  // modifiers: actSHP1; isVersionOf GO:0004725; isVersionOf ec-code:3.1.3.48
  reaction_16: SOS => mSOS; SOS_recruitment_by_pEpoR*SOS*pEpoR*cell;  // modifiers: pEpoR; isVersionOf GO:0006461
  reaction_17: mSOS => SOS; mSOS_release_from_membrane*mSOS*cell;
  reaction_18: Raf => pRaf; mSOS_induced_Raf_phosphorylation*Raf*mSOS*cell;  // modifiers: mSOS; isVersionOf GO:0006468; isVersionOf GO:0000185
  reaction_19: pRaf => Raf; pRaf_dephosphorylation*pRaf*cell;  // isVersionOf GO:0006470; isVersionOf GO:0051390
  reaction_20: MEK2 => pMEK2; First_MEK2_phosphorylation_by_pRaf*MEK2*pRaf*cell;  // modifiers: pRaf; isPartOf reactome:REACT_1727.5; isVersionOf GO:0004709; isVersionOf ec-code:2.7.11.25
  reaction_21: MEK1 => pMEK1; First_MEK1_phosphorylation_by_pRaf*MEK1*pRaf*cell;  // modifiers: pRaf; isPartOf reactome:REACT_545.5; isVersionOf ec-code:2.7.11.25; isVersionOf GO:0004709
  reaction_22: pMEK2 => ppMEK2; Second_MEK2_phosphorylation_by_pRaf*pMEK2*pRaf*cell;  // modifiers: pRaf; isPartOf reactome:REACT_1727.5; isVersionOf GO:0000186; isVersionOf ec-code:2.7.11.25
  reaction_23: pMEK1 => ppMEK1; Second_MEK1_phosphorylation_by_pRaf*pMEK1*pRaf*cell;  // modifiers: pRaf; isPartOf reactome:REACT_545.5; isVersionOf GO:0000186; isVersionOf ec-code:2.7.11.25
  reaction_24: ppMEK2 => pMEK2; First_MEK_dephosphorylation*ppMEK2*cell;  // isVersionOf GO:0006470; isVersionOf GO:0051389
  reaction_25: ppMEK1 => pMEK1; First_MEK_dephosphorylation*ppMEK1*cell;  // isVersionOf GO:0006470; isVersionOf GO:0051389
  reaction_26: pMEK2 => MEK2; Second_MEK_dephosphorylation*pMEK2*cell;  // isVersionOf GO:0006470
  reaction_27: pMEK1 => MEK1; Second_MEK_dephosphorylation*pMEK1*cell;  // isVersionOf GO:0006470
  reaction_28: ERK1 => pERK1; First_ERK1_phosphorylation_by_ppMEK*ERK1*ppMEK2*cell;  // modifiers: ppMEK2; isPartOf reactome:REACT_136.4; isVersionOf ec-code:2.7.12.2 GO:0004708
  reaction_29: ERK2 => pERK2; First_ERK2_phosphorylation_by_ppMEK*ERK2*ppMEK2*cell;  // modifiers: ppMEK2; isVersionOf GO:0004708; isVersionOf ec-code:2.7.12.2
  reaction_30: ERK1 => pERK1; First_ERK1_phosphorylation_by_ppMEK*ERK1*ppMEK1*cell;  // modifiers: ppMEK1; isPartOf reactome:REACT_136.4; isVersionOf ec-code:2.7.12.2 GO:0004708
  reaction_31: ERK2 => pERK2; First_ERK2_phosphorylation_by_ppMEK*ERK2*ppMEK1*cell;  // modifiers: ppMEK1; isVersionOf GO:0004708; isVersionOf ec-code:2.7.12.2
  reaction_32: pERK1 => ppERK1; Second_ERK1_phosphorylation_by_ppMEK*pERK1*ppMEK2*cell;  // modifiers: ppMEK2; isPartOf reactome:REACT_136.4; isVersionOf ec-code:2.7.12.2 GO:0004708 GO:0000187
  reaction_33: pERK2 => ppERK2; Second_ERK2_phosphorylation_by_ppMEK*pERK2*ppMEK2*cell;  // modifiers: ppMEK2; isVersionOf GO:0004708; isVersionOf ec-code:2.7.12.2 GO:0000187
  reaction_34: pERK1 => ppERK1; Second_ERK1_phosphorylation_by_ppMEK*pERK1*ppMEK1*cell;  // modifiers: ppMEK1; isPartOf reactome:REACT_136.4; isVersionOf ec-code:2.7.12.2 GO:0004708 GO:0000187
  reaction_35: pERK2 => ppERK2; Second_ERK2_phosphorylation_by_ppMEK*pERK2*ppMEK1*cell;  // modifiers: ppMEK1; isVersionOf GO:0004708; isVersionOf ec-code:2.7.12.2 GO:0000187
  reaction_36: ppERK1 => pERK1; First_ERK_dephosphorylation*ppERK1*cell;  // isPartOf reactome:REACT_12439.1; isVersionOf GO:0006470 GO:0000188; isVersionOf GO:0017017
  reaction_37: ppERK2 => pERK2; First_ERK_dephosphorylation*ppERK2*cell;  // isVersionOf GO:0000188 GO:0006470; isPartOf reactome:REACT_12439.1; isVersionOf GO:0017017
  reaction_38: pERK1 => ERK1; Second_ERK_dephosphorylation*pERK1*cell;  // isVersionOf GO:0006470; isPartOf reactome:REACT_12439.1; isVersionOf GO:0017017
  reaction_39: pERK2 => ERK2; Second_ERK_dephosphorylation*pERK2*cell;  // isVersionOf GO:0017017; isPartOf reactome:REACT_12439.1; isVersionOf GO:0006470
  reaction_40: mSOS => pSOS; ppERK_neg_feedback_on_mSOS*mSOS*ppERK1*cell;  // modifiers: ppERK1; GO:0004707; isVersionOf ec-code:2.7.11.24 GO:0006468; isHomologTo reactome:REACT_1420.5
  reaction_41: mSOS => pSOS; ppERK_neg_feedback_on_mSOS*mSOS*ppERK2*cell;  // modifiers: ppERK2; GO:0004707; isVersionOf ec-code:2.7.11.24 GO:0006468; isHomologTo reactome:REACT_1420.5
  reaction_42: pSOS => SOS; pSOS_dephosphorylation*pSOS*cell;  // isVersionOf GO:0006470

  // Unit definitions:
  unit substance = 10000 item; substance is "10E4 molecules";
  unit time = 60 second; time is "minutes";
  unit volume = 1e-3 litre; volume is "ml";
  unit U = dimensionless;
  unit U_per_ml = dimensionless / (1e-3 litre);
  unit ml_per_min_per_U = 1e-3 litre / (dimensionless * 60 second); ml_per_min_per_U is "per min per (Uml)";
  unit au = dimensionless; au is "arb. units";
  unit au_per_molec = 1e-3 litre * dimensionless / (10000 item); au_per_molec is "arb. unit. per 10000 molecules";
  unit per_min = 1 / (60 second); per_min is "per minute";
  unit sec_ord = 1e-3 litre / (10000 item * 60 second); sec_ord is "second order rate constant";
end
