// SBML level 2 version 4
// This model was downloaded from BioModels Database
// http://www.ebi.ac.uk/biomodels/

model goldbeter2007()
  // Goldbeter2007_Somitogenesis_Switch
  // This is the simple model without diffusion described in th epublication
  // Sharp developmental thresholds defined through bistability by antagonistic gradients of retinoic acid and FGF signaling.
  // Goldbeter A, Gonze D, Pourquié O. Dev Dyn. 2007 Jun;236(6):1495-508. PMID: 17497689 , doi: 10.1016/j.jtbi.2008.01.006
  // Abstract:
  // The establishment of thresholds along morphogen gradients in the embryo is poorly understood. Using mathematical modeling, we show that mutually inhibitory gradients can generate and position sharp morphogen thresholds in the embryonic space. Taking vertebrate segmentation as a paradigm, we demonstrate that the antagonistic gradients of retinoic acid (RA) and Fibroblast Growth Factor (FGF) along the presomitic mesoderm (PSM) may lead to the coexistence of two stable steady states. Here, we propose that this bistability is associated with abrupt switches in the levels of FGF and RA signaling, which permit the synchronized activation of segmentation genes, such as mesp2, in successive cohorts of PSM cells in response to the segmentation clock, thereby defining the future segments. Bistability resulting from mutual inhibition of RA and FGF provides a molecular mechanism for the all-or-none transitions assumed in the "clock and wavefront" somitogenesis model. Given that mutually antagonistic signaling gradients are common in development, such bistable switches could represent an important principle underlying embryonic patterning.
  // Originally created by libAntimony v1.4 (using libSBML 3.4.1)
  // This model originates from BioModels Database: A Database of Annotated Published Models (http://www.ebi.ac.uk/biomodels/). It is copyright (c) 2005-2011 The BioModels.net Team.
  // For more information see the terms of use .
  // To cite BioModels Database, please use: Li C, Donizelli M, Rodriguez N, Dharuri H, Endler L, Chelliah V, Li L, He E, Henry A, Stefan MI, Snoep JL, Hucka M, Le Novère N, Laibe C (2010) BioModels Database: An enhanced, curated and annotated resource for published quantitative kinetic models. BMC Syst Biol., 4:92.
  // biomodels.db:MODEL1011170000
  // biomodels.db:BIOMD0000000275
  // isDescribedBy pubmed:17497689
  // occursIn taxonomy:7742
  // hasVersion GO:0032526 GO:0044344
  // isVersionOf GO:0001756

  // Compartments:
  compartment PSM = 1;  // isVersionOf FMA:69072

  // Species:
  species RA in PSM = 0.1;  // CHEBI:26536
  species M_C in PSM = 0.1; M_C is "cyp26_mRNA";  // encodes interpro:IPR001128; isVersionOf kegg.compound:C02339; CHEBI:33699
  species C in PSM = 0.1; C is "CYP26";  // hasProperty GO:0008401; isHomologTo kegg.orthology:K12665 kegg.orthology:K12664 kegg.orthology:K07437; isHomologTo uniprot:Q9NR63 uniprot:Q6V0L0 uniprot:O43174; isVersionOf interpro:IPR001128
  species F in PSM = 1; F is "FGF";  // hasProperty GO:0005111 GO:0005105; hasProperty GO:0008083; isHomologTo uniprot:P55075; isVersionOf interpro:IPR002348
  species M_F in PSM; M_F is "FGF_mRNA";  // isVersionOf CHEBI:33699

  // Parameters:
  vs1 has nM_per_min;
  kd5 = 0 per_min;
  kd1 = 1 per_nM_per_min;
  V0 = 0.365 nM_per_min;
  Vsc = 7.1 nM_per_min;
  n = 2 dimensionless;
  Ka = 0.2 nM;
  kd3 = 1 per_min;
  ks2 = 1 per_min;
  kd2 = 0.28 per_min;
  ks3 = 1 per_min;
  Ki = 0.2 nM;
  m = 2 dimensionless;
  kd4 = 1 per_min;
  ks1 = 1 per_min;
  RALDH2_0 = 7.1 nM;
  x = 15 length;
  L = 50 length;
  M_0 = 5 nM;
  rho has dimensionless;
  alpha2 has dimensionless;
  alpha1 has dimensionless;
  Kr1 = 1 nM;
  Kr2 = 1 nM;

  // Assignment rules:
  M_F := M_0*(x/L);
  vs1 := ks1*RALDH2_0*(1 - x/L);
  rho := alpha2/alpha1;
  alpha2 := F/(F + Kr2);
  alpha1 := RA/(RA + Kr1);

  // Reactions:
  RA_synthesis: => RA; PSM*vs1;  // isVersionOf GO:0002138
  RA_decay: RA => ; PSM*kd5*RA;  // isVersionOf GO:0034653
  RA_deg_by_Cyp26: RA => ; PSM*kd1*RA*C;  // modifiers: C; isVersionOf GO:0034653; isVersionOf reactome:REACT_13550.1 reactome:REACT_13572.1
  M_C_transcription: => M_C; PSM*(V0 + Vsc*F^n/(Ka^n + F^n));  // modifiers: F; isVersionOf GO:0009299
  M_C_decay: M_C => ; PSM*kd3*M_C;  // isVersionOf GO:0006402
  C_translation: => C; PSM*ks2*M_C;  // modifiers: M_C; isVersionOf GO:0006412
  C_decay: C => ; PSM*kd2*C;  // isVersionOf GO:0030163
  FGF_synthesis: => F; PSM*ks3*M_F*(Ki^m/(Ki^m + RA^m));  // modifiers: RA, M_F; isVersionOf GO:0006412
  FGF_decay: F => ; PSM*kd4*F;  // isVersionOf GO:0030163

  // Unit definitions:
  unit substance = 1e-9 mole; substance is "nmole";
  unit time = 60 second; time is "min";
  unit nM = 1e-9 mole / litre;
  unit nM_per_min = 1e-9 mole / (litre * 60 second);
  unit per_nM_per_min = litre / (1e-9 mole * 60 second);
  unit per_min = 1 / (60 second);
  unit length = dimensionless; length is "arbit. length";
end
