// SBML level 2 version 4
// This model was downloaded from BioModels Database
// http://www.ebi.ac.uk/biomodels/

model Wang1996_Single_Neuron()
  // Wang1996_Synaptic_Inhibition_Two_Neuron
  // This is a model of one presynaptic and one postsynaptic cell, as described in the article:
  // Gamma oscillation by synaptic inhibition in a hippocampal interneuronal network model.
  // Wang XJ, Buzsáki G. J Neurosci. 1996 Oct 15;16(20):6402-13. PMID: 8815919 ;
  // Abstract:
  // Fast neuronal oscillations (gamma, 20-80 Hz) have been observed in the neocortex and hippocampus during behavioral arousal. Using computer simulations, we investigated the hypothesis that such rhythmic activity can emerge in a random network of interconnected GABAergic fast-spiking interneurons. Specific conditions for the population synchronization, on properties of single cells and the circuit, were identified. These include the following: (1) that the amplitude of spike afterhyperpolarization be above the GABAA synaptic reversal potential; (2) that the ratio between the synaptic decay time constant and the oscillation period be sufficiently large; (3) that the effects of heterogeneities be modest because of a steep frequency-current relationship of fast-spiking neurons. Furthermore, using a population coherence measure, based on coincident firings of neural pairs, it is demonstrated that large-scale network synchronization requires a critical (minimal) average number of synaptic contacts per cell, which is not sensitive to the network size. By changing the GABAA synaptic maximal conductance, synaptic decay time constant, or the mean external excitatory drive to the network, the neuronal firing frequencies were gradually and monotonically varied. By contrast, the network synchronization was found to be high only within a frequency band coinciding with the gamma (20-80 Hz) range. We conclude that the GABAA synaptic transmission provides a suitable mechanism for synchronized gamma oscillations in a sparsely connected network of fast-spiking interneurons. In turn, the interneuronal network can presumably maintain subthreshold oscillations in principal cell populations and serve to synchronize discharges of spatially distributed neurons.
  // The presynaptic and postsynaptic cell have identical parameters and the variables in each cell are identified by using _pre or _post as a postfix to their names. The presynaptic cell influences the postsynaptic one via the synapse (variables and parameters: I_syn, E_syn, g_syn, F, theta_syn, alpha, beta). The applied current to the presynaptic cell, I_app_pre, is set to 2 microA/cm 2 for 10 ms as in figure 1C of the article. The dependence of the postsynaptic cell on directly applied current can be investigated in isolation by setting I_app_pre to 0 and altering I_app_post.
  // Originally created by libAntimony v1.4 (using libSBML 3.4.1)
  // biomodels.db:MODEL1101240000
  // biomodels.db:BIOMD0000000302
  // isDescribedBy pubmed:8815919
  // occursIn taxonomy:10116
  // occursIn BTO:0000920 BTO:0000601
  // hasVersion GO:0051932

  // Compartments:
  compartment pre_synaptic_cell = 1;  // occursIn FMA:62493; FMA:54527
  compartment post_synaptic_cell = 1;  // occursIn FMA:62493; FMA:54527

  // Parameters:
  Cm = 1 uF_per_cm2;
  gL = 0.1 mS_per_cm2;
  gK = 9 mS_per_cm2;
  gNa = 35 mS_per_cm2;
  E_K = -90 mV;
  E_L = -65 mV;
  E_Na = 55 mV;
  phi = 5 dimensionless;
  tau_0 has time;
  I_app_post = 0 uA_per_cm2;
  I_Na_post has uA_per_cm2;
  m_inf_post has dimensionless;
  h_post = alpha_h_post/(beta_h_post + alpha_h_post); h_post has dimensionless;
  V_post = -64 mV;
  alpha_m_post has per_ms;
  beta_m_post has per_ms;
  alpha_h_post has per_ms;
  beta_h_post has per_ms;
  I_K_post has uA_per_cm2;
  n_post = alpha_n_post/(beta_n_post + alpha_n_post); n_post has dimensionless;
  alpha_n_post has per_ms;
  beta_n_post has per_ms;
  I_L_post has uA_per_cm2;
  I_syn has uA_per_cm2;
  g_syn = 0.1 mS_per_cm2;
  s = alpha*F/(beta + alpha*F); s has dimensionless;
  E_syn = -75 mV;
  alpha = 12 per_ms;
  F has dimensionless;
  beta = 0.1 per_ms;
  V_pre = -64 mV;
  theta_syn = 0 mV;
  I_app_pre has uA_per_cm2;
  I_Na_pre has uA_per_cm2;
  m_inf_pre has dimensionless;
  h_pre = alpha_h_pre/(beta_h_pre + alpha_h_pre); h_pre has dimensionless;
  n_pre = alpha_n_pre/(beta_n_pre + alpha_n_pre); n_pre has dimensionless;
  alpha_n_pre has per_ms;
  beta_n_pre has per_ms;
  alpha_h_pre has per_ms;
  beta_h_pre has per_ms;
  alpha_m_pre has per_ms;
  beta_m_pre has per_ms;
  I_K_pre has uA_per_cm2;
  I_L_pre has uA_per_cm2;

  // Assignment rules:
  tau_0 := Cm/gL;
  I_Na_post := gNa*m_inf_post^3*h_post*(V_post - E_Na);
  m_inf_post := alpha_m_post/(alpha_m_post + beta_m_post);
  alpha_m_post := -0.1*(V_post + 35)/(exp(-0.1*(V_post + 35)) - 1);
  beta_m_post := 4*exp(-(V_post + 60)/18);
  alpha_h_post := 0.07*exp(-(V_post + 58)/20);
  beta_h_post := 1/(exp(-0.1*(V_post + 28)) + 1);
  I_K_post := gK*n_post^4*(V_post - E_K);
  alpha_n_post := -0.01*(V_post + 34)/(exp(-0.1*(V_post + 34)) - 1);
  beta_n_post := 0.125*exp(-(V_post + 44)/80);
  I_L_post := gL*(V_post - E_L);
  I_syn := g_syn*s*(V_post - E_syn);
  F := 1/(1 + exp(-(V_pre - theta_syn)/2));
  I_app_pre := piecewise(2, (time >= 10) && (time <= 20), 0);
  I_Na_pre := gNa*m_inf_pre^3*h_pre*(V_pre - E_Na);
  m_inf_pre := alpha_m_pre/(alpha_m_pre + beta_m_pre);
  alpha_n_pre := -0.01*(V_pre + 34)/(exp(-0.1*(V_pre + 34)) - 1);
  beta_n_pre := 0.125*exp(-(V_pre + 44)/80);
  alpha_h_pre := 0.07*exp(-(V_pre + 58)/20);
  beta_h_pre := 1/(exp(-0.1*(V_pre + 28)) + 1);
  alpha_m_pre := -0.1*(V_pre + 35)/(exp(-0.1*(V_pre + 35)) - 1);
  beta_m_pre := 4*exp(-(V_pre + 60)/18);
  I_K_pre := gK*n_pre^4*(V_pre - E_K);
  I_L_pre := gL*(V_pre - E_L);

  // Rate rules:
  h_post' = phi*(alpha_h_post*(1 - h_post) - beta_h_post*h_post);
  V_post' = (I_app_post - (I_Na_post + I_K_post + I_L_post + I_syn))/Cm;
  n_post' = phi*(alpha_n_post*(1 - n_post) - beta_n_post*n_post);
  s' = alpha*F*(1 - s) - beta*s;
  V_pre' = (I_app_pre - (I_Na_pre + I_K_pre + I_L_pre))/Cm;
  h_pre' = phi*(alpha_h_pre*(1 - h_pre) - beta_h_pre*h_pre);
  n_pre' = phi*(alpha_n_pre*(1 - n_pre) - beta_n_pre*n_pre);

  // Unit definitions:
  unit time = 1e-3 second; time is "ms";
  unit per_ms = 1 / (1e-3 second);
  unit mV = 1e-3 volt;
  unit uA_per_cm2 = 1e-6 ampere / (0.01 metre)^2; uA_per_cm2 is "microA_per_cm2";
  unit uF_per_cm2 = 1e-6 farad / (0.01 metre)^2;
  unit mS_per_cm2 = 1e-3 siemens / (0.01 metre)^2;
end
