// SBML level 2 version 4
// This model was downloaded from BioModels Database
// http://www.ebi.ac.uk/biomodels/

model Bertram2007_IsletCell_Oscillations()
  // This is the model described in the article:
  // Interaction of glycolysis and mitochondrial respiration in metabolic oscillations of pancreatic islets.
  // Bertram R, Satin LS, Pedersen MG, Luciani DS, Sherman A. Biophys J. 2007 Mar 1;92(5):1544-55. Pubmed ID: 17172305, doi: 10.1529/biophysj.106.097154.
  // Abstract:
  // Insulin secretion from pancreatic beta-cells is oscillatory, with a typical period of 2-7 min, reflecting oscillations in membrane potential and the cytosolic Ca(2+) concentration. Our central hypothesis is that the slow 2-7 min oscillations are due to glycolytic oscillations, whereas faster oscillations that are superimposed are due to Ca(2+) feedback onto metabolism or ion channels. We extend a previous mathematical model based on this hypothesis to include a more detailed description of mitochondrial metabolism. We demonstrate that this model can account for typical oscillatory patterns of membrane potential and Ca(2+) concentration in islets. It also accounts for temporal data on oxygen consumption in islets. A recent challenge to the notion that glycolytic oscillations drive slow Ca(2+) oscillations in islets are data showing that oscillations in Ca(2+), mitochondrial oxygen consumption, and NAD(P)H levels are all terminated by membrane hyperpolarization. We demonstrate that these data are in fact compatible with a model in which glycolytic oscillations are the key player in rhythmic islet activity. Finally, we use the model to address the recent finding that the activity of islets from some mice is uniformly fast, whereas that from islets of other mice is slow. We propose a mechanism for this dichotomy.
  // This model was taken from the CellML repository and automatically converted to SBML.
  // The original model was: Bertram, Satin, Pedersen, Luciani, Sherman, 2007 version 02
  // The original CellML model was created and curated by:
  // Catherine May Lloyd
  // c.lloyd(at)auckland.ac.nz
  // The University of Auckland, Bioengineering Institute
  // This model originates from BioModels Database: A Database of Annotated Published Models (http://www.ebi.ac.uk/biomodels/). It is copyright (c) 2005-2011 The BioModels.net Team.
  // For more information see the terms of use.
  // To cite BioModels Database, please use: Li C, Donizelli M, Rodriguez N, Dharuri H, Endler L, Chelliah V, Li L, He E, Henry A, Stefan MI, Snoep JL, Hucka M, Le Novère N, Laibe C (2010) BioModels Database: An enhanced, curated and annotated resource for published quantitative kinetic models. BMC Syst Biol., 4:92.
  // biomodels.db:MODEL7889980156
  // biomodels.db:BIOMD0000000376
  // isDescribedBy pubmed:17172305
  // biomodels.db:BIOMD0000000373
  // occursIn BTO:0000783
  // isVersionOf GO:0061469 GO:0006096 GO:0044342

  // Compartments:
  compartment Compartment = 1;

  // Species:
  species Vm in Compartment = -60/Compartment;  // PATO:0001462
  species n in Compartment = 0;  // isVersionOf GO:0005251
  species G6P in Compartment = 301/Compartment;  // isVersionOf CHEBI:14314
  species FBP in Compartment = 2.16/Compartment;  // isVersionOf CHEBI:16905
  species NADHm in Compartment = 0.4/Compartment;  // isVersionOf CHEBI:16908
  species delta_psi in Compartment = 164/Compartment;
  species Cam in Compartment = 0.2/Compartment;  // isVersionOf CHEBI:29108
  species ADPm in Compartment = 11.1/Compartment;  // isVersionOf CHEBI:16761
  species adp in Compartment = 1137/Compartment;  // isVersionOf CHEBI:16761
  species c in Compartment = 0.17/Compartment;  // isVersionOf CHEBI:29108
  species Caer in Compartment = 345/Compartment;  // isVersionOf CHEBI:29108

  // Parameters:
  cm = 5300;
  gK = 2700;
  tau_n = 20;
  gCa = 1000;
  gkCa = 300;
  kd = 0.5;
  gkATP_ = 16000;
  kGPDH = 0.0005;
  bottom1 = 1;
  weight1 = 1;
  topa1 = 0;
  k1 = 30;
  k2 = 1;
  k3 = 50000;
  k4 = 220;
  VmaxPFK = 5;
  f13 = 0.02;
  f43 = 20;
  f23 = 0.2;
  f42 = 20;
  f41 = 20;
  lambda = 0.06;
  p1 = 400;
  p2 = 1;
  p3 = 0.01;
  JGPDHbas = 0.0005;
  p4 = 0.6;
  p5 = 0.1;
  p6 = 177;
  p7 = 5;
  NADmtot = 10;
  Cmito = 1.8;
  p8 = 7;
  p9 = 0.1;
  p10 = 177;
  p11 = 5;
  p13 = 10;
  p14 = 190;
  p15 = 8.5;
  p16 = 35;
  JGK = 0.4;
  p17 = 0.002;
  p18 = -0.03;
  p19 = 0.35;
  p20 = 2;
  FRT = 0.037410133;
  p21 = 0.04;
  p22 = 1.1;
  p23 = 0.01;
  p24 = 0.016;
  fmito = 0.01;
  Amtot = 15;
  khyd = 5e-5;
  khydbas = 5e-5;
  atot = 2500;
  fcyt = 0.01;
  kPMCA = 0.1;
  alpha = 4.5e-6;
  Cbas = 0.05;
  pleak = 0.0002;
  kSERCA = 0.4;
  fer = 0.01;
  Vc_Ver = 31;
  gamma = 0.001;
  kappa = 0.001;
  VK = -75;
  VCa = 25;
  AMP = 500;

  // Assignment rules:
  Ik := gK*n*(Vm - VK);
  n_infinity := 1/(1 + exp(-(16 + Vm)/5));
  m_infinity := 1/(1 + exp(-(20 + Vm)/12));
  Ica := gCa*m_infinity*(Vm - VCa);
  Ikca := gkCa*(c^2/(c^2 + kd^2))*(Vm - VK);
  mgadp := 0.165*adp;
  topo := 0.08*(1 + 2*mgadp/17) + 0.89*(mgadp/17)^2;
  adp3m := 0.135*adp;
  JGPDH := kGPDH*FBP^(1/2);
  F6P := 0.3*G6P;
  topa2 := topa1;
  weight3 := F6P^2/k3;
  topa3 := topa2 + weight3;
  weight5 := FBP/k2;
  weight7 := FBP*F6P^2/(k2*f23*k3);
  weight9 := AMP/k1;
  weight11 := AMP*F6P^2/(k1*k3*f13);
  weight13 := AMP*FBP/(k1*k2);
  weight15 := AMP*FBP*F6P^2/(k1*k2*f23*f13*k3);
  topb := weight15;
  JO := p4*NADHm/(p5 + NADHm)/(1 + exp((delta_psi - p6)/p7));
  NADm := NADmtot - NADHm;
  JPDH := p1/(p2 + NADHm/NADm)*(Cam/(p3 + Cam))*(JGPDH + JGPDHbas);
  JHres := p8*(NADHm/(p9 + NADHm))*(1/(1 + exp((delta_psi - p10)/p11)));
  JGK_ms := kappa*JGK;
  JHleak := p17*delta_psi + p18;
  Juni := (p21*delta_psi - p22)*c^2;
  JNaCa := p23*(Cam/c)*exp(p24*delta_psi);
  Jmito := JNaCa - Juni;
  ATPm := Amtot - ADPm;
  JF1F0 := p16*p13/(p13 + ATPm)*(1/(1 + exp((p14 - delta_psi)/p15)));
  JHatp := 3*JF1F0;
  RATm := ATPm/ADPm;
  JANT := p19*(RATm/(RATm + p20))*exp(0.5*FRT*delta_psi);
  atp := atot - adp;
  atp4m := 0.05*atp;
  bottomo := (1 + mgadp/17)^2*(1 + adp3m/26 + atp4m/1);
  katpo := topo/bottomo;
  Ikatp := gkATP_*katpo*(Vm - VK);
  weight2 := atp^2/k4;
  bottom2 := bottom1 + weight2;
  bottom3 := bottom2 + weight3;
  weight4 := (F6P*atp)^2/(k3*k4*f43);
  topa4 := topa3 + weight4;
  bottom4 := bottom3 + weight4;
  topa5 := topa4;
  bottom5 := bottom4 + weight5;
  weight6 := FBP*atp^2/(k2*f42*k4);
  topa6 := topa5;
  bottom6 := bottom5 + weight6;
  topa7 := topa6 + weight7;
  bottom7 := bottom6 + weight7;
  weight8 := FBP*F6P^2*atp^2/(k2*f23*f42*f43*k3*k4);
  topa8 := topa7 + weight8;
  topa9 := topa8;
  bottom8 := bottom7 + weight8;
  bottom9 := bottom8 + weight9;
  weight10 := AMP*atp^2/(k1*k4*f41);
  topa10 := topa9;
  bottom10 := bottom9 + weight10;
  topa11 := topa10 + weight11;
  bottom11 := bottom10 + weight11;
  weight12 := AMP*F6P^2*atp^2/(k1*f13*f41*f43*k3*k4);
  topa12 := topa11 + weight12;
  bottom12 := bottom11 + weight12;
  topa13 := topa12;
  bottom13 := bottom12 + weight13;
  weight14 := AMP*FBP*atp^2/(k1*k2*f42*f41*k4);
  topa14 := topa13;
  bottom14 := bottom13 + weight14;
  topa15 := topa14;
  bottom15 := bottom14 + weight15;
  weight16 := AMP*FBP*F6P^2*atp^2/(k1*k2*k3*k4*f23*f13*f42*f41*f43);
  topa16 := topa15 + weight16;
  bottom16 := bottom15 + weight16;
  JPFK := (VmaxPFK*lambda*topa16 + VmaxPFK*topb)/bottom16;
  JPFK_ms := kappa*JPFK;
  Jhyd := (khyd*c + khydbas)*atp;
  Jmem := -(alpha*Ica + kPMCA*(c - Cbas));
  Jleak := pleak*(Caer - c);
  JSERCA := kSERCA*c;
  Jer := Jleak - JSERCA;
  delta := 3.9/53.2;

  // Rate rules:
  Vm' = -(Ik + Ica + Ikca + Ikatp)/cm;
  n' = (n_infinity - n)/tau_n;
  G6P' = JGK_ms - JPFK_ms;
  FBP' = JPFK_ms - 0.5*JGPDH;
  NADHm' = gamma*(JPDH - JO);
  delta_psi' = (JHres - (JHatp + JANT + JHleak + JNaCa + 2*Juni))/Cmito;
  Cam' = -fmito*Jmito;
  ADPm' = gamma*(JANT - JF1F0);
  adp' = -delta*JANT + Jhyd;
  c' = fcyt*(Jmem + Jer + delta*Jmito);
  Caer' = -fer*Vc_Ver*Jer;
end
