// SBML level 2 version 4
// This model was downloaded from BioModels Database
// http://www.ebi.ac.uk/biomodels/

function Constant_flux_reversible(v)
  v;
end
Constant_flux_reversible is "Constant flux (reversible)";

function cyt_FBPase(Vm, s1, p1, p2, q, Ks1, r1, Kr1, Kp1, Kp2)
  Vm*s1*(s1 - p1*p2/q)/((Ks1*(1 + r1/Kr1))^2*((s1/(Ks1*(1 + r1/Kr1)))^2 + (1 + p1/Kp1)*(1 + p2/Kp2)));
end
cyt_FBPase is "cyt. FBPase";

function TPTout(Vm, s, Ks, r1, Kr1, r2, Kr2, p, Kp, r3, Kr3, r4, Kr4)
  Vm/(s/Ks + r1/Kr1 + r2/Kr2 + p/Kp + r3/Kr3 + r4/Kr4 + (s/Ks + r1/Kr1 + r2/Kr2)*(p/Kp + r3/Kr3 + r4/Kr4))*(s*(p/Kp + r3/Kr3 + r4/Kr4)/Ks - p*(s/Ks + r1/Kr1 + r2/Kr2)/Kp);
end

function MM_s1p1_reg(Vm, s1, p1, q, Ks1, Kp1)
  Vm*(s1 - p1/q)/(Ks1*(1 + s1/Ks1 + p1/Kp1));
end
MM_s1p1_reg is "MM s1p1 - reg";

function F6Pc_kinase(Vm, s1, Ks1, r1, Kr1, r2, r3, Kr2)
  Vm*s1/Ks1*(1 + r1/Kr1)/(1 + (r2 + r3)/Kr2);
end

function MM_s2p2_reg(s1, s2, p1, p2, q, Ks1, Ks2, Kp1, Kp2, Vm)
  Vm*(s1*s2 - p1*p2/q)/(Ks1*Ks2*((1 + s1/Ks1)*(1 + s2/Ks2) + (1 + p1/Kp1)*(1 + p2/Kp2) - 1));
end
MM_s2p2_reg is "MM s2p2 - reg";

function MM_s2p2_reg_1_x_1_a(Vm, r1, r2, s1, s2, p1, p2, q, Ks1, Ks2, Kp1, Kp2)
  Vm*(r1/r2)^2*(s1*s2 - p1*p2/q)/(Ks1*Ks2*((1 + s1/Ks1)*(1 + s2/Ks2) + (1 + p1/Kp1)*(1 + p2/Kp2) - 1));
end
MM_s2p2_reg_1_x_1_a is "MM s2p2 + reg 1*x,1*a";

function MMlike_s2p3_reg(Vm, s1, s2, p1, p2, p3, q, Ks1, Ks2, Kp1, Kp2, Kp3)
  Vm*(s1*s2 - p1*p2*p3/q)/(Ks1*Ks2*((1 + s1/Ks1)*(1 + s2/Ks2) + p1/Kp1 + p2/Kp2 + p3/Kp3 + p1*p2*p3/(Kp1*Kp2*Kp3)));
end
MMlike_s2p3_reg is "MMlike s2p3 - reg";

function F26BPc_phosphatase(Vm, s1, Ks1, r1, r2, Kr1, r3, Kr3, r4, Kr4)
  Vm*s1/Ks1*(1 + (r1 + r2)/Kr1)/(1 + r3/Kr3 + r4/Kr4);
end

function Sucrose_synthase(Vm, s1, s2, p1, p2, p3, q, Ks1, r1, Kr11, Ks2, Kp1, Kp2, Kr12)
  Vm*s1*(s1*s2 - p1*p2*p3/q)/((Ks1*(1 + r1/Kr11))^2*Ks2*((1 + (s1/(Ks1*(1 + r1/Kr11)))^2)*(1 + s2/Ks2) + (1 + p1/Kp1)*(1 + p2/Kp2) - 1 + r1/Kr12));
end

function MMlike_s1p2_reg_no_p2_alone(Vm, s1, p1, p2, q, Ks1, Kp1, Kp2)
  Vm*(s1 - p1*p2/q)/(Ks1*(1 + s1/Ks1 + p1/Kp1 + p1*p2/(Kp1*Kp2)));
end
MMlike_s1p2_reg_no_p2_alone is "MMlike s1p2 - reg + no p2 alone";

function Transketolase(Vm, q, s1, s2, p1, p2, K1, K2, K1s2, K2s1, r1, K2r1, K2s2, r2)
  Vm*(q*s1*s2 - p1*p2)/(K1*K2*(1 + (1 + s2/K1s2)*(s1/K2s1 + r1/K2r1) + s2/K2s2 + 1/K2*(p2*(1 + p1*r2/K1) + p1 + r2)));
end

function MM_s2p1_reg(s1, s2, p1, q, Ks1, Ks2, Kp1, Vm)
  Vm*(s1*s2 - p1/q)/(Ks1*Ks2*((1 + s1/Ks1)*(1 + s2/Ks2) + p1/Kp1));
end
MM_s2p1_reg is "MM s2p1 - reg";

function MM_s1p2_reg(Vm, s1, p1, p2, q, Ks1, Kp1, Kp2)
  Vm*(s1 - p1*p2/q)/(Ks1*(s1/Ks1 + (1 + p1/Kp1)*(1 + p2/Kp2)));
end
MM_s1p2_reg is "MM s1p2 - reg";

model Arnold2011_Laisk2006_CalvinCycle_Starch_Sucrose()
  // This model is from the article:
  // A quantitative comparison of Calvin–Benson cycle models
  // Anne Arnold, Zoran Nikoloski Trends in Plant Science 2011 Oct 14. 22001849 ,
  // Abstract:
  // The Calvin-Benson cycle (CBC) provides the precursors for biomass synthesis necessary for plant growth. The dynamic behavior and yield of the CBC depend on the environmental conditions and regulation of the cellular state. Accurate quantitative models hold the promise of identifying the key determinants of the tightly regulated CBC function and their effects on the responses in future climates. We provide an integrative analysis of the largest compendium of existing models for photosynthetic processes. Based on the proposed ranking, our framework facilitates the discovery of best-performing models with regard to metabolomics data and of candidates for metabolic engineering.
  // Note: Model of the Calvin cycle and the related end-product pathways to starch and sucrose synthesis by Laisk et al. (2006, DOI:10.1007/s11120-006-9109-1 ) and the personally provided implementation to Laisk et al. (2009, DOI:10.1007/978-1-4020-9237-4_13 ).
  // A reduced version of the published model is implemented (light-dependent reactions are taken out). The parameter values are widely taken from Laisk et al. (1989, [click here for PDF] ). The initial metabolite values are chosen from the data set of Zhu et al. (2007, DOI:10.1104/pp.107.103713 ). A detailed description of all modifications is given in the model described by Arnold and Nikoloski (2011, PMID:22001849 .
  // biomodels.db:MODEL1109270008
  // biomodels.db:BIOMD0000000392
  // isDescribedBy pubmed:22001849
  // encodes GO:0019253
  // occursIn taxonomy:40674
  // occursIn taxonomy:33090

  // Compartments:
  compartment chloroplast = 1;
  compartment cytosol = 1;

  // Species:
  species RuBP in chloroplast = 0.002;  // CHEBI:16710
  species $E in chloroplast;
  species ER in chloroplast = 0.001201;
  species EPP in chloroplast = 0.0002711;
  species EPG in chloroplast = 0.0003206;
  species EP in chloroplast = 0.0007045;
  species EOP in chloroplast = 0.0002966;
  species PGA in chloroplast = 0.0024;  // isVersionOf CHEBI:17050
  species TP in chloroplast = 0.0005;  // isVersionOf pubchem.compound:24794350
  species $GAP in chloroplast;  // isVersionOf CHEBI:17138
  species $DHAP in chloroplast;  // CHEBI:16108
  species FBP in chloroplast = 0.00067;  // isVersionOf CHEBI:16905
  species HeP in chloroplast = 0.0022;  // isVersionOf CHEBI:15965
  species $F6P in chloroplast;  // CHEBI:15946
  species $G6P in chloroplast;  // pubchem.compound:439958
  species $G1P in chloroplast;  // isVersionOf pubchem.compound:65533
  species E4P in chloroplast = 5e-5;  // pubchem.compound:122357
  species SBP in chloroplast = 0.0003;  // isVersionOf pubchem.compound:164735
  species S7P in chloroplast = 0.002;  // isVersionOf pubchem.compound:165007
  species PeP in chloroplast = 0.00025;  // isVersionOf pubchem.compound:1005
  species $X5P in chloroplast;  // isVersionOf pubchem.compound:23615403
  species $R5P in chloroplast;  // isVersionOf pubchem.compound:439167
  species $Ru5P in chloroplast;  // isVersionOf CHEBI:17363
  species ADPG in chloroplast = 6.295e-6;  // isVersionOf pubchem.compound:16500
  species ATP in chloroplast = 0.00068;  // isVersionOf CHEBI:15422
  species $ADP in chloroplast;  // isVersionOf CHEBI:16761
  species $Pi in chloroplast;  // CHEBI:43474
  species $PiPi in chloroplast = 1e-6;
  species $H in chloroplast = 0.08912509;
  species $CO2 in chloroplast;  // isVersionOf CHEBI:16526
  species $O2 in chloroplast = 0.00026;  // isVersionOf CHEBI:15379
  species $NADPH in chloroplast = 0.00021;  // isVersionOf CHEBI:16474
  species $NADP in chloroplast = 0.00029;  // isVersionOf CHEBI:25523
  species PGAc in cytosol = 0;  // isVersionOf CHEBI:17050
  species TPc in cytosol = 0.0023;  // isVersionOf pubchem.compound:24794350
  species $GAPc in cytosol;  // isVersionOf CHEBI:17138
  species $DHAPc in cytosol;  // isVersionOf CHEBI:16108
  species FBPc in cytosol = 0.002;  // isVersionOf CHEBI:16905
  species F26BPc in cytosol = 7.8e-9;  // isVersionOf pubchem.compound:105021
  species HePc in cytosol = 0.0058;  // isVersionOf CHEBI:15965
  species $F6Pc in cytosol;  // isVersionOf CHEBI:15946
  species $G6Pc in cytosol;  // isVersionOf pubchem.compound:5958
  species $G1Pc in cytosol;  // isVersionOf pubchem.compound:65533
  species UDPGc in cytosol = 0.00057;  // isVersionOf pubchem.compound:8629
  species $UTPc in cytosol = 0.00036;  // isVersionOf CHEBI:15713
  species $UDPc in cytosol = 0.00064;  // isVersionOf CHEBI:17659
  species $ATPc in cytosol = 0.00036;  // isVersionOf CHEBI:15422
  species $ADPc in cytosol;  // isVersionOf CHEBI:16761
  species SucPc in cytosol = 0;  // isVersionOf pubchem.compound:161554
  species $Succ in cytosol = 0;  // isVersionOf CHEBI:17992
  species $Pic in cytosol;  // isVersionOf CHEBI:43474
  species $PiPic in cytosol = 4e-5;
  species $Hc in cytosol = 0.1584893;  // isVersionOf CHEBI:15378

  // Parameters:
  Et = 0.00280303;
  ADT = 0.0015;
  ADTc = 0.001;
  UDTc = 0.001;
  NADPT = 0.0005;
  PiT = 0.02840909;
  PiTc = 0.01704545;
  q12 = 2.227863e12;
  Kp12 = 224014.8;
  q1 = 0.1290531;
  V28 = 7.386364e-5;

  // Assignment rules:
  ADPc := ADTc - ATPc;
  GAP := TP/(1 + 1.0007329);
  Ru5P := PeP*0.99974/(1 + 0.99974 + 0.99974/1.000053);
  F6P := HeP*0.999837/(1 + 0.999837 + 0.999308);
  Pic := PiTc - 2*(FBPc + UTPc + ATPc + PiPic) - (PGAc + TPc + HePc + SucPc + UDPGc + UDPc + ADPc);
  X5P := PeP*(0.99974/1.000053)/(1 + 0.99974 + 0.99974/1.000053);
  G6P := HeP/(1 + 0.999837 + 0.999308);
  G1P := HeP*0.999308/(1 + 0.999837 + 0.999308);
  G1Pc := HePc*0.999308/(1 + 0.999837 + 0.999308);
  DHAP := 1.0007329*TP/(1 + 1.0007329);
  G6Pc := HePc/(1 + 0.999837 + 0.999308);
  F6Pc := HePc*0.999837/(1 + 0.999837 + 0.999308);
  R5P := PeP/(1 + 0.99974 + 0.99974/1.000053);
  ADP := ADT - ATP;
  Pi := PiT - 2*(EPP + EPG + RuBP + FBP + SBP + ATP + PiPi) - (EP + PGA + TP + HeP + E4P + S7P + PeP + ADP + ADPG);
  GAPc := TPc/(1 + 1.0007329);
  DHAPc := 1.0007329*TPc/(1 + 1.0007329);
  CO2 := (1.2e-5/(0.38 + 0.015) + 8*4*0.00055*3030.3*ER*O2/2)/(1/(0.38 + 0.015) + 8*4*0.00055*300000*ER);
  E := Et - (ER + EPP + EPG + EP + EOP);
  W4 := 6*EOP - 70000*Pi*E;

  // Reactions:
  RuBisCO_1: RuBP + $E -> ER; chloroplast*(RuBisCO_1_k1*RuBP*E - RuBisCO_1_k2*ER); RuBisCO_1 is "RuBisCO (1)";
    RuBisCO_1_k1 = 50000; RuBisCO_1_k2 = 0.9;
  RuBisCO_2_CO2: ER + $CO2 => EPP; chloroplast*RuBisCO_2_CO2_k1*ER*CO2; RuBisCO_2_CO2 is "RuBisCO (2) - V(CO2)";
    RuBisCO_2_CO2_k1 = 300000;
  RuBisCO_4: EPP -> PGA + EP; chloroplast*(RuBisCO_4_k1*EPP - RuBisCO_4_k2*PGA*EP); RuBisCO_4 is "RuBisCO (4)";
    RuBisCO_4_k1 = 6; RuBisCO_4_k2 = 0;
  RuBisCO_5_EP: EP -> PGA + $E; chloroplast*(RuBisCO_5_EP_k1*EP - RuBisCO_5_EP_k2*PGA*E); RuBisCO_5_EP is "RuBisCO (5) - EP";
    RuBisCO_5_EP_k1 = 6; RuBisCO_5_EP_k2 = 70000;
  RuBisCO_5_EOP: EOP -> ; chloroplast*Constant_flux_reversible(W4); RuBisCO_5_EOP is "RuBisCO (5) - EOP";
  RuBisCO_6_O2: ER + $O2 + 0.5 ATP => EPG + 0.5 PGA + 0.5 $ADP; chloroplast*RuBisCO_6_O2_k1*ER*O2; RuBisCO_6_O2 is "RuBisCO (6) - V(O2)";
    RuBisCO_6_O2_k1 = 3030.3;
  RuBisCO_7: EPG => EP; chloroplast*RuBisCO_7_k1*EPG; RuBisCO_7 is "RuBisCO (7)";
    RuBisCO_7_k1 = 3;
  PGA_K: PGA + ATP -> TP + $ADP + $Pi; chloroplast*MMlike_s2p3_reg(PGA_K_Vm, PGA, ATP, GAP, ADP, Pi, q1, PGA_K_Ks1, PGA_K_Ks2, PGA_K_Kp1, PGA_K_Kp2, Kp3); PGA_K is "PGA kinase";  // modifiers: GAP
    PGA_K_Vm = 0.0170455; PGA_K_Ks1 = 0.0011122; PGA_K_Ks2 = 0.0003307; PGA_K_Kp1 = 0.00027035; PGA_K_Kp2 = 0.00053013; Kp3 = 0.0027397;
  FBP_A: 2 TP -> FBP; chloroplast*MM_s2p1_reg(GAP, DHAP, FBP, FBP_A_q, FBP_A_Ks1, FBP_A_Ks2, FBP_A_Kp1, FBP_A_Vm); FBP_A is "Aldolase (FBP)";  // modifiers: GAP, DHAP
    FBP_A_q = 1.18815; FBP_A_Ks1 = 0.00027035; FBP_A_Ks2 = 0.00036393; FBP_A_Kp1 = 2.0129e-5; FBP_A_Vm = 0.022727;
  FBPase: FBP -> HeP + $Pi; chloroplast*MMlike_s1p2_reg_no_p2_alone(FBPase_Vm, FBP, F6P, Pi, FBPase_q, FBPase_Ks1, FBPase_Kp1, FBPase_Kp2);  // modifiers: F6P
    FBPase_Vm = 0.011364; FBPase_q = 0.77294; FBPase_Ks1 = 3.2842e-5; FBPase_Kp1 = 6.3429e-5; FBPase_Kp2 = 0.0017914;
  F6P_TK: HeP + TP -> E4P + PeP; chloroplast*Transketolase(F6P_TK_Vm, F6P_TK_q, F6P, GAP, E4P, X5P, F6P_TK_K1, F6P_TK_K2, F6P_TK_K1s2, F6P_TK_K2s1, S7P, F6P_TK_K2r1, F6P_TK_K2s2, R5P); F6P_TK is "Transketolase (F6P)";  // modifiers: F6P, GAP, X5P, S7P, R5P
    F6P_TK_Vm = 0.170455; F6P_TK_q = 0.99943; F6P_TK_K1 = 0.00061349; F6P_TK_K2 = 0.00011438; F6P_TK_K1s2 = 0.00027035; F6P_TK_K2s1 = 0.0005407; F6P_TK_K2r1 = 0.00017677; F6P_TK_K2s2 = 9.0464e-5;
  SBP_A: E4P + TP -> SBP; chloroplast*MM_s2p1_reg(E4P, DHAP, SBP, SBP_A_q, SBP_A_Ks1, SBP_A_Ks2, SBP_A_Kp1, SBP_A_Vm); SBP_A is "Aldolase (SBP)";  // modifiers: DHAP
    SBP_A_q = 1.18815; SBP_A_Ks1 = 0.00017677; SBP_A_Ks2 = 0.00036393; SBP_A_Kp1 = 2.0129e-5; SBP_A_Vm = 0.011364;
  SBPase: SBP -> S7P + $Pi; chloroplast*MM_s1p2_reg(SBPase_Vm, SBP, S7P, Pi, SBPase_q, SBPase_Ks1, SBPase_Kp1, SBPase_Kp2);
    SBPase_Vm = 0.00568182; SBPase_q = 0.77294; SBPase_Ks1 = 1.2713e-5; SBPase_Kp1 = 1.5597e-5; SBPase_Kp2 = 0.006744;
  S7P_TK: S7P + TP -> 2 PeP; chloroplast*Transketolase(S7P_TK_Vm, S7P_TK_q, S7P, GAP, R5P, X5P, S7P_TK_K1, S7P_TK_K2, S7P_TK_K1s2, S7P_TK_K2s1, F6P, S7P_TK_K2r1, S7P_TK_K2s2, E4P); S7P_TK is "Transketolase (S7P)";  // modifiers: GAP, R5P, X5P, F6P, E4P
    S7P_TK_Vm = 0.0821023; S7P_TK_q = 0.99996; S7P_TK_K1 = 0.00061349; S7P_TK_K2 = 0.00011438; S7P_TK_K1s2 = 0.00027035; S7P_TK_K2s1 = 0.00017677; S7P_TK_K2r1 = 0.0005407; S7P_TK_K2s2 = 9.0464e-5;
  Ru5P_K: PeP + ATP -> RuBP + $ADP; chloroplast*MM_s2p2_reg(Ru5P, ATP, RuBP, ADP, Ru5P_K_q, Ru5P_K_Ks1, Ru5P_K_Ks2, Ru5P_K_Kp1, Ru5P_K_Kp2, Ru5P_K_Vm); Ru5P_K is "Ru5P kinase";  // modifiers: Ru5P
    Ru5P_K_q = 1.05289; Ru5P_K_Ks1 = 3.63934e-5; Ru5P_K_Ks2 = 0.00055117; Ru5P_K_Kp1 = 9.95868e-5; Ru5P_K_Kp2 = 9.11825e-5; Ru5P_K_Vm = 0.568182;
  ATP_S: $ADP + $Pi -> ATP; chloroplast*MM_s2p1_reg(ADP, Pi, ATP, q12, ATP_S_Ks1, ATP_S_Ks2, Kp12, ATP_S_Vm); ATP_S is "ATP synthase";
    ATP_S_Ks1 = 0.00031808; ATP_S_Ks2 = 0.00031612; ATP_S_Vm = 0.0284091;
  AGPase: HeP + ATP -> ADPG + $PiPi; chloroplast*MM_s2p2_reg_1_x_1_a(AGPase_Vm, PGA, Pi, G1P, ATP, ADPG, PiPi, AGPase_q, AGPase_Ks1, AGPase_Ks2, AGPase_Kp1, AGPase_Kp2);  // modifiers: G1P, PGA, Pi
    AGPase_Vm = 0.00113636; AGPase_q = 0.11059; AGPase_Ks1 = 0.0010398; AGPase_Ks2 = 0.00011023; AGPase_Kp1 = 0.00053013; AGPase_Kp2 = 0.01951;
  StS: ADPG -> $ADP; chloroplast*MM_s1p1_reg(StS_Vm, ADPG, ADP, StS_q, StS_Ks1, StS_Kp1); StS is "Starch synthase";
    StS_Vm = 0.00284091; StS_q = 1.00326; StS_Ks1 = 0.000212052; StS_Kp1 = 0.000636157;
  TPT_TP: TP -> TPc; TPTout(TPT_TP_Vm, TP, TPT_TP_Ks, PGA, TPT_TP_Kr1, Pi, TPT_TP_Kr2, TPc, TPT_TP_Kp, PGAc, TPT_TP_Kr3, Pic, TPT_TP_Kr4); TPT_TP is "TPT (TP)";  // modifiers: PGA, Pi, PGAc, Pic
    TPT_TP_Vm = 0.0568182; TPT_TP_Ks = 9.3583e-5; TPT_TP_Kr1 = 0.00089213; TPT_TP_Kr2 = 9.8597e-5; TPT_TP_Kp = 9.6372e-5; TPT_TP_Kr3 = 0.00054107; TPT_TP_Kr4 = 9.4837e-5;
  TPT_PGA: PGA -> PGAc; TPTout(TPT_PGA_Vm, PGA, TPT_PGA_Ks, TP, TPT_PGA_Kr1, Pi, TPT_PGA_Kr2, PGAc, TPT_PGA_Kp, TPc, TPT_PGA_Kr3, Pic, TPT_PGA_Kr4); TPT_PGA is "TPT (PGA)";  // modifiers: TP, Pi, TPc, Pic
    TPT_PGA_Vm = 0.0568182; TPT_PGA_Ks = 0.00089213; TPT_PGA_Kr1 = 9.3583e-5; TPT_PGA_Kr2 = 9.8597e-5; TPT_PGA_Kp = 0.00054107; TPT_PGA_Kr3 = 9.6372e-5; TPT_PGA_Kr4 = 9.4837e-5;
  FBPc_A: 2 TPc -> FBPc; cytosol*MM_s2p1_reg(GAPc, DHAPc, FBPc, FBPc_A_q, FBPc_A_Ks1, FBPc_A_Ks2, FBPc_A_Kp1, FBPc_A_Vm); FBPc_A is "cyt. Aldolase (FBP)";  // modifiers: GAPc, DHAPc
    FBPc_A_q = 1.00224; FBPc_A_Ks1 = 0.000278407; FBPc_A_Ks2 = 0.000374778; FBPc_A_Kp1 = 2.10226e-5; FBPc_A_Vm = 0.00568182;
  FBPcase: FBPc -> HePc + $Pic; cytosol*cyt_FBPase(FBPcase_Vm, FBPc, F6Pc, Pic, FBPcase_q, FBPcase_Ks1, F26BPc, FBPcase_Kr1, FBPcase_Kp1, FBPcase_Kp2); FBPcase is "cyt. FBPase";  // modifiers: F6Pc, F26BPc
    FBPcase_Vm = 0.00113636; FBPcase_q = 0.792367; FBPcase_Ks1 = 2.2129e-5; FBPcase_Kr1 = 1.1065e-6; FBPcase_Kp1 = 6.5319e-5; FBPcase_Kp2 = 0.0018624;
  UGPase: HePc + $UTPc -> UDPGc + $PiPic; cytosol*MM_s2p2_reg(G1Pc, UTPc, UDPGc, PiPic, UGPase_q, UGPase_Ks1, UGPase_Ks2, UGPase_Kp1, UGPase_Kp2, UGPase_Vm);  // modifiers: G1Pc
    UGPase_q = 1.6219; UGPase_Ks1 = 3.2124e-5; UGPase_Ks2 = 0.0002364; UGPase_Kp1 = 0.00014393; UGPase_Kp2 = 0.0013192; UGPase_Vm = 0.00410568;
  SucPc_S: HePc + UDPGc -> $UDPc + SucPc + $Hc; cytosol*Sucrose_synthase(SucPc_S_Vm, F6Pc, UDPGc, UDPc, SucPc, Hc, SucPc_S_q, SucPc_S_Ks1, Pic, Kr11, SucPc_S_Ks2, SucPc_S_Kp1, SucPc_S_Kp2, Kr12); SucPc_S is "Sucrose synthase";  // modifiers: F6Pc, Pic
    SucPc_S_Vm = 7.38636e-5; SucPc_S_q = 1.00012; SucPc_S_Ks1 = 0.000278407; Kr11 = 0.00920241; SucPc_S_Ks2 = 0.000110717; SucPc_S_Kp1 = 0.000642157; SucPc_S_Kp2 = 0.000374778; Kr12 = 0.00164329;
  SucPc_P: SucPc -> $Succ + $Pic; cytosol*MMlike_s1p2_reg_no_p2_alone(SucPc_P_Vm, SucPc, Succ, Pic, SucPc_P_q, SucPc_P_Ks1, SucPc_P_Kp1, SucPc_P_Kp2); SucPc_P is "Sucrose phosphatase";
    SucPc_P_Vm = 0.0010267; SucPc_P_q = 1.35286; SucPc_P_Ks1 = 5.354e-5; SucPc_P_Kp1 = 0.01; SucPc_P_Kp2 = 0.002191;
  F6Pc_K: HePc => F26BPc + $ADPc; cytosol*F6Pc_kinase(F6Pc_K_Vm, F6Pc, F6Pc_K_Ks1, Pic, F6Pc_K_Kr1, TPc, PGAc, F6Pc_K_Kr2); F6Pc_K is "F6Pc kinase";  // modifiers: F6Pc, Pic, TPc, PGAc
    F6Pc_K_Vm = 1.02614e-7; F6Pc_K_Ks1 = 0.001; F6Pc_K_Kr1 = 0.001; F6Pc_K_Kr2 = 0.0015;
  F26BPc_P: F26BPc => HePc + $Pic; cytosol*F26BPc_phosphatase(F26BPc_P_Vm, F26BPc, F26BPc_P_Ks1, TPc, PGAc, F26BPc_P_Kr1, Pic, F26BPc_P_Kr3, HePc, F26BPc_P_Kr4); F26BPc_P is "F26BPc phosphatase";  // modifiers: F6Pc, TPc, PGAc
    F26BPc_P_Vm = 2.05284e-10; F26BPc_P_Ks1 = 1e-9; F26BPc_P_Kr1 = 0.002; F26BPc_P_Kr3 = 0.001; F26BPc_P_Kr4 = 0.0001;

  // Unit definitions:
  unit volume = litre;
  unit substance = mole;
end
