// SBML level 2 version 4
// This model was downloaded from BioModels Database
// http://www.ebi.ac.uk/biomodels/

function function_4_cE4_degr(cCOP1d, cCOP1n, cE3n, cE4, cLUX, def, m10, m35, m9, p21, p25, p26)
  (m35*cE4 + p25*cE4*cE3n - p21*p25*cE4*cE3n/(p26*cLUX + p21 + m9*cCOP1d + m10*cCOP1n))/def;
end

function function_4_cE3_m_trscr(cL, def, e, g16, n3)
  n3*g16^e/(cL^e + g16^e)/def;
end

function function_4_cE3_m_degr(cE3_m, def, m26)
  m26*cE3_m/def;
end

function function_4_cE3_trsl(cE3_m, def, p16)
  p16*cE3_m/def;
end

function function_4_cE3_degr(cCOP1c, cE3, def, m9)
  m9*cE3*cCOP1c/def;
end

function function_4_cE3n_degr(cCOP1d, cCOP1n, cE3n, cE4, cG, cLUX, def, m10, m19, m9, p17, p21, p25, p26, p28, p29)
  (m10*cE3n*cCOP1n + m9*cE3n*cCOP1d + p25*cE4*cE3n - p21*p25*cE4*cE3n/(p26*cLUX + p21 + m9*cCOP1d + m10*cCOP1n) + p17*cE3n*p28*cG/(p29 + m19 + p17*cE3n))/def;
end

function function_4_cE3n_import(cE3, cE3n, def, p19, p20)
  (p19*cE3 - p20*cE3n)/def;
end

function function_4_cLUX_m_trscr(cEC, cL, cT, def, e, g2, g6, n13, g19, g)
  g19^g/(g19^g + cT^g)*(n13*g2/(cEC + g2)*g6^e/(cL^e + g6^e))/def;
end

function function_4_cLUX_m_degr(cLUX_m, def, m34)
  m34*cLUX_m/def;
end

function function_4_cLUX_trsl(cLUX_m, def, p27)
  p27*cLUX_m/def;
end

function function_4_cLUX_degr_1(cCOP1d, cCOP1n, cE3n, cE4, cLUX, def, m10, m36, m9, p21, p25, p26)
  (m36*cLUX + p26*cLUX*p25*cE4*cE3n/(p26*cLUX + p21 + m9*cCOP1d + m10*cCOP1n))/def;
end

function function_4_cCOP1c_trsl(def, n5)
  n5/def;
end

function function_4_cCOP1c_degr(L, cCOP1c, m27, p15)
  m27*cCOP1c*(1 + p15*L);
end

function function_4_cCOP1n_import(cCOP1c, def, p6)
  p6*cCOP1c/def;
end

function function_4_cL_m_trscr(L, a, cNI, cP, cP7, cP9, cT, g1, n1, q1)
  L*q1*cP + n1*g1^a/((cP9 + cP7 + cNI + cT)^a + g1^a);
end

function function_4_cL_m_degr(L, cL_m, m1, m2)
  (m2 + (m1 - m2)*L)*cL_m;
end

function function_4_cL_trsl(L, cL_m, p1, p2)
  cL_m*(p1*L + p2);
end

function function_4_cL_degr(c, cL, def, g3, m3, p3)
  (m3*cL + p3*cL^c/(cL^c + g3^c))/def;
end

function function_4_cL_modif(c, cL, def, g3, p3)
  p3*cL^c/(cL^c + g3^c)/def;
end

function function_4_cLm_degr(cLm, def, m4)
  m4*cLm/def;
end

function function_4_cP_trsl(L, cP, p7)
  p7*(1 - L)*(1 - cP);
end

function function_4_cP_degr(L, cP, m11)
  m11*cP*L;
end

function function_4_cP9_m_trscr_1(L, cEC, cL, cP, cT, e, g8, g9, n4, n7, g18, g, q3)
  g18^g/(g18^g + cT^g)*(L*q3*cP + (n4 + n7*cL^e/(cL^e + g9^e))*g8/(cEC + g8));
end

function function_4_cP9_m_degr(cP9_m, def, m12)
  m12*cP9_m/def;
end

function function_4_cP9_trsl(cP9_m, def, p8)
  p8*cP9_m/def;
end

function function_4_cP9_degr(L, cP9, m13, m22)
  (m13 + m22*(1 - L))*cP9;
end

function function_4_cP7_m_trscr_1(cL, cLm, cP9, cT, def, e, f, g10, g11, n8, n9, g22, g)
  g22^g/(g22^g + cT^g)*(n8*(cLm + cL)^e/((cLm + cL)^e + g10^e) + n9*cP9^f/(cP9^f + g11^f))/def;
end

function function_4_cP7_m_degr(cP7_m, def, m14)
  m14*cP7_m/def;
end

function function_4_cP7_trsl(cP7_m, def, p9)
  p9*cP7_m/def;
end

function function_4_cP7_degr(L, cP7, m15, m23)
  (m15 + m23*(1 - L))*cP7;
end

function function_4_cNI_m_trscr_1(b, cLm, cP7, cT, def, e, g12, g13, n10, n11, g23, g)
  g23^g/(g23^g + cT^g)*(n10*cLm^e/(cLm^e + g12^e) + n11*cP7^b/(cP7^b + g13^b))/def;
end

function function_4_cNI_m_degr(cNI_m, def, m16)
  m16*cNI_m/def;
end

function function_4_cNI_trsl(cNI_m, def, p10)
  p10*cNI_m/def;
end

function function_4_cNI_degr(L, cNI, m17, m24)
  (m17 + m24*(1 - L))*cNI;
end

function function_4_cT_m_trscr(cEC, cL, def, e, g4, g5, n2, j, g25, cSnRK2)
  n2/(1 + (cL/(g5*(1 + (cSnRK2/g25)^j)))^e)*g4/(cEC + g4)/def;
end

function function_4_cT_m_degr(cT_m, def, m5)
  m5*cT_m/def;
end

function function_4_cT_trsl(cT_m, def, p4)
  p4*cT_m/def;
end

function function_4_cT_degr(L, cT, cZG, cZTL, m6, m7, m8, p5)
  (m6 + m7*(1 - L))*cT*(p5*cZTL + cZG) + m8*cT;
end

function function_4_cE4_m_trscr_1(cEC, cL, cT, def, e, g6, g20, g21, g, n15)
  g21^g/(g21^g + cT^g)*(n15*g20/(cEC + g20)*g6^e/(cL^e + g6^e))/def;
end

function function_4_cE4_m_degr(cE4_m, def, m34)
  m34*cE4_m/def;
end

function function_4_cE4_trsl(cE4_m, def, p23)
  p23*cE4_m/def;
end

function function_4_cs_act_1(L, def, i, g26, n18, n19, cSnRK2, cs)
  (n19 + n18*L)*(1 - cs)*g26^i/(g26^i + cSnRK2^i)/def;
end

function function_4_cs_degr_1(def, m29, cs)
  m29*cs/def;
end

function function_4_cCOP1n_degr(L, cCOP1n, m27, p15)
  m27*cCOP1n*(1 + p15*L);
end

function function_4_cCOP1d_degr(L, cCOP1d, m31, m33)
  m31*(1 + m33*(1 - L))*cCOP1d;
end

function function_4_cCOP1d_activ(L, cCOP1n, cP, n14, n6)
  n6*L*cP*cCOP1n + n14*cCOP1n;
end

function function_4_cG_m_trscr_1(L, cEC, cL, cP, cT, e, g14, g15, n12, g17, g, q2)
  g17^g/(g17^g + cT^g)*(L*q2*cP + n12*g14/(cEC + g14)*g15^e/(cL^e + g15^e));
end

function function_4_cG_m_degr(cG_m, def, m18)
  m18*cG_m/def;
end

function function_4_cG_trsl(cG_m, def, p11)
  p11*cG_m/def;
end

function function_4_cG_degr_1(cE3n, cG, def, m19, p17, p28, p29)
  (m19*cG + p28*cG - p29*p28*cG/(p29 + m19 + p17*cE3n))/def;
end

function function_4_cG_cZTL_assoc(L, cG, cZG, cZTL, p12, p13)
  p12*L*cZTL*cG - p13*(1 - L)*cZG;
end

function function_4_cZTL_trsl(def, p14)
  p14/def;
end

function function_4_cZTL_degr(cZTL, def, m20)
  m20*cZTL/def;
end

function function_4_cZG_degr(cZG, def, m21)
  m21*cZG/def;
end

function function_4_cG_cE3_assoc(cE3, cG, def, p17)
  p17*cE3*cG/def;
end

function function_4_cEG_degr_1(cCOP1c, cCOP1d, cCOP1n, cE3n, cEG, cG, def, m10, m19, m9, p17, p18, p28, p29, p31)
  (m10*cEG*cCOP1c + p18*cEG - p31*(p18*cEG + p17*cE3n*p28*cG/(p29 + m19 + p17*cE3n))/(m10*cCOP1n + m9*cCOP1d + p31))/def;
end

function function_4_cEC_form(cCOP1d, cCOP1n, cE3n, cE4, cLUX, def, m10, m9, p21, p25, p26)
  p26*cLUX*p25*cE4*cE3n/(p26*cLUX + p21 + m9*cCOP1d + m10*cCOP1n)/def;
end

function function_4_cEC_degr(L, cCOP1d, cCOP1n, cE3n, cEC, cEG, cG, d, g7, m10, m19, m32, m9, p17, p18, p24, p28, p29, p31)
  m10*cCOP1n*cEC + m9*cCOP1d*cEC + m32*cEC*(1 + p24*L*(p28*cG/(p29 + m19 + p17*cE3n) + (p18*cEG + p17*cE3n*p28*cG/(p29 + m19 + p17*cE3n))/(m10*cCOP1n + m9*cCOP1d + p31))^d/((p28*cG/(p29 + m19 + p17*cE3n) + (p18*cEG + p17*cE3n*p28*cG/(p29 + m19 + p17*cE3n))/(m10*cCOP1n + m9*cCOP1d + p31))^d + g7^d));
end

function function_4_cABAR_m_trscr_1(cL, cT, def, e, g24, g28, n17, g)
  g24^g/(g24^g + cT^g)*n17*cL^e/(cL^e + g28^e)/def;
end

function function_4_cABAR_m_degr(def, m37, cABAR_m)
  m37*cABAR_m/def;
end

function function_4_cPP2C_act_1(def, g27, g29, p33, A0, h, cABAR_m)
  p33*g27^h/((0.5*(A0 + cABAR_m + g29 - ((A0 + cABAR_m + g29)^2 - 4*A0*cABAR_m)^(1/2)))^h + g27^h)/def;
end

function function_4_cPP2C_degr_1(def, m39, cPP2C)
  m39*cPP2C/def;
end

function function_4_cSnRK2_degr(def, m30, cPP2C, cSnRK2)
  m30*cSnRK2*cPP2C/def;
end

function function_4_cSnRK2_act_1(def, p32)
  p32/def;
end

model MODEL1209110002()
  // Pokhilko2013 - TOC1 signalling in Arabidopsis circadian clock
  // In this model, Pokhilko et al. has incorporated the negative transcriptional regulations of the core clock genes by TOC1 and the up-regulation of TOC1 expression by ABA signalling, to their previous model BIOMD0000000412
  // This model is described in the article:
  // Modelling the widespread effects of TOC1 signalling on the plant circadian clock and its outputs.
  // Pokhilko A, Mas P, Millar AJ.
  // BMC Syst Biol 2013; 7: 23
  // Abstract:
  // BACKGROUND: 24-hour biological clocks are intimately connected to the cellular signalling network, which complicates the analysis of clock mechanisms. The transcriptional regulator TOC1 (TIMING OF CAB EXPRESSION 1) is a founding component of the gene circuit in the plant circadian clock. Recent results show that TOC1 suppresses transcription of multiple target genes within the clock circuit, far beyond its previously-described regulation of the morning transcription factors LHY (LATE ELONGATED HYPOCOTYL) and CCA1 (CIRCADIAN CLOCK ASSOCIATED 1). It is unclear how this pervasive effect of TOC1 affects the dynamics of the clock and its outputs. TOC1 also appears to function in a nested feedback loop that includes signalling by the plant hormone Abscisic Acid (ABA), which is upregulated by abiotic stresses, such as drought. ABA treatments both alter TOC1 levels and affect the clock's timing behaviour. Conversely, the clock rhythmically modulates physiological processes induced by ABA, such as the closing of stomata in the leaf epidermis. In order to understand the dynamics of the clock and its outputs under changing environmental conditions, the reciprocal interactions between the clock and other signalling pathways must be integrated. RESULTS: We extended the mathematical model of the plant clock gene circuit by incorporating the repression of multiple clock genes by TOC1, observed experimentally. The revised model more accurately matches the data on the clock's molecular profiles and timing behaviour, explaining the clock's responses in TOC1 over-expression and toc1 mutant plants. A simplified representation of ABA signalling allowed us to investigate the interactions of ABA and circadian pathways. Increased ABA levels lengthen the free-running period of the clock, consistent with the experimental data. Adding stomatal closure to the model, as a key ABA- and clock-regulated downstream process allowed to describe TOC1 effects on the rhythmic gating of stomatal closure. CONCLUSIONS: The integrated model of the circadian clock circuit and ABA-regulated environmental sensing allowed us to explain multiple experimental observations on the timing and stomatal responses to genetic and environmental perturbations. These results crystallise a new role of TOC1 as an environmental sensor, which both affects the pace of the central oscillator and modulates the kinetics of downstream processes.
  // This model is hosted on BioModels Database and identified by: BIOMD0000000445.
  // To cite BioModels Database, please use: BioModels Database: An enhanced, curated and annotated resource for published quantitative kinetic models.
  // To the extent possible under law, all copyright and related or neighbouring rights to this encoded model have been dedicated to the public domain worldwide. Please refer to CC0 Public Domain Dedication for more information.
  // biomodels.db:MODEL1209110002
  // biomodels.db:BIOMD0000000445
  // isDescribedBy pubmed:23506153
  // isDerivedFrom biomodels.db:BIOMD0000000412
  // isVersionOf GO:0042752
  // hasTaxon taxonomy:3702

  // Compartments:
  compartment default = 1;  // isVersionOf BTO:0000316
  compartment def = 1;  // occursIn GO:0005623
  compartment No_Name = 1;

  // Species:
  species cABAR_m in default = 1;  // encodes uniprot:Q9FNB0; isVersionOf CHEBI:33699
  species cPP2C in default = 1;  // isVersionOf uniprot:Q9CAJ0
  species cSnRK2 in default = 1;  // isVersionOf uniprot:Q940H6
  species cs in default = 1;
  species cCOP1c in def = 0.3269;  // isVersionOf uniprot:P43254; occursIn GO:0005737
  species cCOP1d in def = 0.2566;  // isVersionOf uniprot:P43254; occursIn GO:0005634
  species cCOP1n in def = 0.65;  // isVersionOf uniprot:P43254; occursIn GO:0005634
  species cE3 in def = 0.1503;  // isVersionOf uniprot:O82804
  species cE3_m in def = 0.2991;  // encodes uniprot:O82804; isVersionOf CHEBI:33699
  species cE3n in def = 0.0286;  // isVersionOf uniprot:O82804; occursIn GO:0005634
  species cE4 in def = 0.207;  // isVersionOf uniprot:O04211
  species cE4_m in def = 0.1012;  // encodes uniprot:O04211; isVersionOf CHEBI:33699
  species cEC in def = 0.0709;  // hasPart uniprot:O82804 uniprot:O04211 uniprot:F4J959
  species cEG in def = 0.0041;  // isVersionOf uniprot:Q9SQI2 uniprot:O82804
  species cG in def = 0.0196;  // isVersionOf uniprot:Q9SQI2
  species cG_m in def = 0.1017;  // encodes uniprot:Q9SQI2; isVersionOf CHEBI:33699
  species cL in def = 0.506;  // hasPart uniprot:Q6R0H1 uniprot:P92973
  species cLUX in def = 0.576;  // isVersionOf uniprot:F4J959
  species cLUX_m in def = 0.1012;  // encodes uniprot:F4J959; isVersionOf CHEBI:33699
  species cL_m in def = 1.0151;  // encodes uniprot:P92973 uniprot:Q6R0H1; isVersionOf CHEBI:33699
  species cLm in def = 0.0788;  // hasPart uniprot:Q6R0H1 uniprot:P92973; isVersionOf CCO:U0000010
  species cNI in def = 0.0697;  // isVersionOf uniprot:Q6LA42
  species cNI_m in def = 0.0731;  // CHEBI:33699; encodes uniprot:Q9LVG4
  species cP in def = 0.956;  // isVersionOf GO:0003575
  species cP7 in def = 0.1167;  // isVersionOf uniprot:Q93WK5
  species cP7_m in def = 0.4016;  // encodes uniprot:Q93WK5; isVersionOf CHEBI:33699
  species cP9 in def = 0.0238;  // isVersionOf uniprot:Q8L500
  species cP9_m in def = 0.0658;  // encodes uniprot:Q8L500; isVersionOf CHEBI:33699
  species cT in def = 0.0435;  // isVersionOf uniprot:Q9LKL2
  species cT_m in def = 0.0977;  // encodes uniprot:Q9LKL2; isVersionOf CHEBI:33699
  species cZG in def = 0.0755;  // isVersionOf uniprot:Q9SQI2 uniprot:Q94BT6
  species cZTL in def = 0.2505;  // isVersionOf uniprot:Q94BT6

  // Parameters:
  n1 = 2.6;
  n2 = 0.35;
  n3 = 0.29;
  n4 = 0.04;
  n5 = 0.4;
  n6 = 20;
  n7 = 0.1;
  n8 = 0.5;
  n9 = 0.6;
  n10 = 0.3;
  n11 = 0.6;
  n12 = 9;
  n13 = 2;
  n14 = 0.1;
  g1 = 0.1;
  g2 = 0.01;
  g3 = 0.6;
  g4 = 0.006;
  g5 = 0.2;
  g6 = 0.3;
  g7 = 1;
  g8 = 0.04;
  g9 = 0.3;
  g10 = 0.5;
  g11 = 0.7;
  g12 = 0.1;
  g13 = 1;
  g14 = 0.02;
  g15 = 0.4;
  g16 = 0.3;
  m1 = 0.54;
  m2 = 0.24;
  m3 = 0.2;
  m4 = 0.2;
  m5 = 0.3;
  m6 = 0.2;
  m7 = 0.1;
  m8 = 0.5;
  m9 = 0.2;
  m10 = 0.1;
  m11 = 1;
  m12 = 1;
  m13 = 0.32;
  m14 = 0.4;
  m15 = 0.7;
  m16 = 0.5;
  m17 = 0.5;
  m18 = 3.4;
  m19 = 0.9;
  m20 = 0.6;
  m21 = 0.08;
  m22 = 0.1;
  m23 = 0.5;
  m24 = 0.5;
  m25 = 0.9;
  m26 = 0.5;
  m27 = 0.1;
  m28 = 28;
  m29 = 0.3;
  m30 = 1;
  m31 = 0.1;
  m32 = 0.2;
  m33 = 13;
  m34 = 0.6;
  m35 = 0.3;
  m36 = 0.3;
  m37 = 0.4;
  a = 2;
  b = 2;
  c = 2;
  d = 2;
  e = 2;
  f = 2;
  p1 = 0.13;
  p2 = 0.27;
  p3 = 0.1;
  p4 = 0.5;
  p5 = 1;
  p6 = 0.2;
  p7 = 0.3;
  p8 = 0.6;
  p9 = 0.8;
  p10 = 0.54;
  p11 = 0.5;
  p12 = 10;
  p13 = 0.1;
  p14 = 0.14;
  p15 = 2;
  p16 = 0.62;
  p17 = 17;
  p18 = 4;
  p19 = 1;
  p20 = 0.1;
  p21 = 1;
  p22 = 0.5;
  p23 = 0.37;
  p24 = 11;
  p25 = 2;
  p26 = 0.3;
  p27 = 0.8;
  p28 = 2;
  p29 = 0.1;
  p30 = 0.9;
  q1 = 1;
  q2 = 1.56;
  q3 = 3;
  lightOffset = 0;
  cyclePeriod = 24;
  lightAmplitude = 1;
  phase = 0;
  twilightPeriod = 0.05;
  photoPeriod = 12;
  g17 = 0.6;
  g18 = 0.4;
  g19 = 0.4;
  g20 = 0.03;
  g21 = 0.4;
  g22 = 0.1;
  g = 2;
  n15 = 2;
  h = 2;
  i = 2;
  j = 2;
  g23 = 0.6;
  g24 = 0.3;
  g25 = 0.5;
  g26 = 0.3;
  g27 = 0.2;
  g28 = 0.1;
  g29 = 1;
  m38 = 0.3;
  m39 = 0.2;
  n18 = 0.5;
  n16 = 0;
  quantity = 0;
  n17 = 0.5;
  n19 = 0.2;
  p31 = 0.1;
  p32 = 0.1;
  p33 = 0.2;
  A0 = 1;

  // Assignment rules:
  L := lightOffset + 0.5*lightAmplitude*(1 + tanh(cyclePeriod*((time + phase)/cyclePeriod - floor(floor(time + phase)/cyclePeriod))/twilightPeriod)) - 0.5*lightAmplitude*(1 + tanh((cyclePeriod*((time + phase)/cyclePeriod - floor(floor(time + phase)/cyclePeriod)) - photoPeriod)/twilightPeriod)) + 0.5*lightAmplitude*(1 + tanh((cyclePeriod*((time + phase)/cyclePeriod - floor(floor(time + phase)/cyclePeriod)) - cyclePeriod)/twilightPeriod));
  D := 1 - L;

  // Reactions:
  cL_m_trscr: => cL_m; def*function_4_cL_m_trscr(L, a, cNI, cP, cP7, cP9, cT, g1, n1, q1);  // modifiers: cP, cP9, cP7, cNI, cT; isVersionOf GO:0009299
  cL_m_degr: cL_m => ; def*function_4_cL_m_degr(L, cL_m, m1, m2);  // isVersionOf GO:0006402
  cL_trsl: => cL; def*function_4_cL_trsl(L, cL_m, p1, p2);  // modifiers: cL_m; isVersionOf GO:0006412
  cL_degr: cL => ; def*function_4_cL_degr(c, cL, def, g3, m3, p3);  // isVersionOf GO:0030163
  cL_modif: => cLm; def*function_4_cL_modif(c, cL, def, g3, p3);  // modifiers: cL; isVersionOf MOD:00000
  cLm_degr: cLm => ; def*function_4_cLm_degr(cLm, def, m4);  // isVersionOf GO:0030163
  cP_trsl: => cP; def*function_4_cP_trsl(L, cP, p7);  // isVersionOf GO:0006412
  cP_degr: cP => ; def*function_4_cP_degr(L, cP, m11);  // isVersionOf GO:0030163
  cP9_m_trscr: => cP9_m; def*function_4_cP9_m_trscr_1(L, cEC, cL, cP, cT, e, g8, g9, n4, n7, g18, g, q3);  // modifiers: cP, cL, cEC, cT; isVersionOf GO:0009299
  cP9_m_degr: cP9_m => ; def*function_4_cP9_m_degr(cP9_m, def, m12);  // isVersionOf GO:0006402
  cP9_trsl: => cP9; def*function_4_cP9_trsl(cP9_m, def, p8);  // modifiers: cP9_m; isVersionOf GO:0006412
  cP9_degr: cP9 => ; def*function_4_cP9_degr(L, cP9, m13, m22);  // isVersionOf GO:0030163
  cP7_m_trscr: => cP7_m; def*function_4_cP7_m_trscr_1(cL, cLm, cP9, cT, def, e, f, g10, g11, n8, n9, g22, g);  // modifiers: cLm, cL, cP9, cT; isVersionOf GO:0009299
  cP7_m_degr: cP7_m => ; def*function_4_cP7_m_degr(cP7_m, def, m14);  // isVersionOf GO:0006402
  cP7_trsl: => cP7; def*function_4_cP7_trsl(cP7_m, def, p9);  // modifiers: cP7_m; isVersionOf GO:0006412
  cP7_degr: cP7 => ; def*function_4_cP7_degr(L, cP7, m15, m23);  // isVersionOf GO:0030163
  cNI_m_trscr: => cNI_m; def*function_4_cNI_m_trscr_1(b, cLm, cP7, cT, def, e, g12, g13, n10, n11, g23, g);  // modifiers: cT, cLm, cP7; isVersionOf GO:0009299
  cNI_m_degr: cNI_m => ; def*function_4_cNI_m_degr(cNI_m, def, m16);  // isVersionOf GO:0006402
  cNI_trsl: => cNI; def*function_4_cNI_trsl(cNI_m, def, p10);  // modifiers: cNI_m; isVersionOf GO:0006412
  cNI_degr: cNI => ; def*function_4_cNI_degr(L, cNI, m17, m24);  // isVersionOf GO:0030163
  cT_m_trscr: => cT_m; def*function_4_cT_m_trscr(cEC, cL, def, e, g4, g5, n2, j, g25, cSnRK2);  // modifiers: cL, cSnRK2, cEC; isVersionOf GO:0009299
  cT_m_degr: cT_m => ; def*function_4_cT_m_degr(cT_m, def, m5);  // isVersionOf GO:0006402
  cT_trsl: => cT; def*function_4_cT_trsl(cT_m, def, p4);  // modifiers: cT_m; isVersionOf GO:0006412
  cT_degr: cT => ; def*function_4_cT_degr(L, cT, cZG, cZTL, m6, m7, m8, p5);  // modifiers: cZTL, cZG; isVersionOf GO:0030163
  cE4_m_trscr: => cE4_m; def*function_4_cE4_m_trscr_1(cEC, cL, cT, def, e, g6, g20, g21, g, n15);  // modifiers: cT, cEC, cL; isVersionOf GO:0009299
  cE4_m_degr: cE4_m => ; def*function_4_cE4_m_degr(cE4_m, def, m34);  // isVersionOf GO:0006402
  cE4_trsl: => cE4; def*function_4_cE4_trsl(cE4_m, def, p23);  // modifiers: cE4_m; isVersionOf GO:0006412
  cE4_degr: cE4 => ; def*function_4_cE4_degr(cCOP1d, cCOP1n, cE3n, cE4, cLUX, def, m10, m35, m9, p21, p25, p26);  // modifiers: cE3n, cLUX, cCOP1d, cCOP1n; isVersionOf GO:0030163
  cE3_m_trscr: => cE3_m; def*function_4_cE3_m_trscr(cL, def, e, g16, n3);  // modifiers: cL; isVersionOf GO:0009299
  cE3_m_degr: cE3_m => ; def*function_4_cE3_m_degr(cE3_m, def, m26);  // isVersionOf GO:0006402
  cE3_trsl: => cE3; def*function_4_cE3_trsl(cE3_m, def, p16);  // modifiers: cE3_m; isVersionOf GO:0006412
  cE3_degr: cE3 => ; def*function_4_cE3_degr(cCOP1c, cE3, def, m9);  // modifiers: cCOP1c; isVersionOf GO:0030163
  cE3n_import: cE3 => cE3n; def*function_4_cE3n_import(cE3, cE3n, def, p19, p20);  // isVersionOf GO:0015031
  cE3n_degr: cE3n => ; def*function_4_cE3n_degr(cCOP1d, cCOP1n, cE3n, cE4, cG, cLUX, def, m10, m19, m9, p17, p21, p25, p26, p28, p29);  // modifiers: cCOP1n, cCOP1d, cE4, cLUX, cG; isVersionOf GO:0030163
  cLUX_m_trscr: => cLUX_m; def*function_4_cLUX_m_trscr(cEC, cL, cT, def, e, g2, g6, n13, g19, g);  // modifiers: cT, cEC, cL; isVersionOf GO:0009299
  cLUX_m_degr: cLUX_m => ; def*function_4_cLUX_m_degr(cLUX_m, def, m34);  // isVersionOf GO:0006402
  cLUX_trsl: => cLUX; def*function_4_cLUX_trsl(cLUX_m, def, p27);  // modifiers: cLUX_m; isVersionOf GO:0006412
  cLUX_degr: cLUX => ; def*function_4_cLUX_degr_1(cCOP1d, cCOP1n, cE3n, cE4, cLUX, def, m10, m36, m9, p21, p25, p26);  // modifiers: cE4, cE3n, cCOP1d, cCOP1n; isVersionOf GO:0030163
  cCOP1c_trsl: => cCOP1c; def*function_4_cCOP1c_trsl(def, n5);  // isVersionOf GO:0006412
  cCOP1c_degr: cCOP1c => ; def*function_4_cCOP1c_degr(L, cCOP1c, m27, p15);  // isVersionOf GO:0030163
  cCOP1n_import: cCOP1c => cCOP1n; def*function_4_cCOP1n_import(cCOP1c, def, p6);  // isVersionOf GO:0015031
  cCOP1n_degr: cCOP1n => ; def*function_4_cCOP1n_degr(L, cCOP1n, m27, p15);  // isVersionOf GO:0030163
  cCOP1d_activ: cCOP1n => cCOP1d; def*function_4_cCOP1d_activ(L, cCOP1n, cP, n14, n6);  // modifiers: cP; isVersionOf MOD:00000
  cCOP1d_degr: cCOP1d => ; def*function_4_cCOP1d_degr(L, cCOP1d, m31, m33);  // isVersionOf GO:0030163
  cG_m_trscr: => cG_m; def*function_4_cG_m_trscr_1(L, cEC, cL, cP, cT, e, g14, g15, n12, g17, g, q2);  // modifiers: cT, cP, cEC, cL; isVersionOf GO:0009299
  cG_m_degr: cG_m => ; def*function_4_cG_m_degr(cG_m, def, m18);  // isVersionOf GO:0006402
  cG_trsl: => cG; def*function_4_cG_trsl(cG_m, def, p11);  // modifiers: cG_m; isVersionOf GO:0006412
  cG_degr: cG => ; def*function_4_cG_degr_1(cE3n, cG, def, m19, p17, p28, p29);  // modifiers: cE3n; isVersionOf GO:0030163
  cG_cZTL_assoc: cG + cZTL -> cZG; def*function_4_cG_cZTL_assoc(L, cG, cZG, cZTL, p12, p13);  // isVersionOf GO:0006461
  cZTL_trsl: => cZTL; def*function_4_cZTL_trsl(def, p14);  // isVersionOf GO:0006412
  cZTL_degr: cZTL => ; def*function_4_cZTL_degr(cZTL, def, m20);  // isVersionOf GO:0030163
  cZG_degr: cZG => ; def*function_4_cZG_degr(cZG, def, m21);  // isVersionOf GO:0030163
  cG_cE3_assoc: cE3 + cG => cEG; def*function_4_cG_cE3_assoc(cE3, cG, def, p17);  // isVersionOf GO:0006461
  cEG_degr: cEG => ; def*function_4_cEG_degr_1(cCOP1c, cCOP1d, cCOP1n, cE3n, cEG, cG, def, m10, m19, m9, p17, p18, p28, p29, p31);  // modifiers: cCOP1c, cE3n, cG, cCOP1n, cCOP1d; isVersionOf GO:0030163
  cEC_form: => cEC; def*function_4_cEC_form(cCOP1d, cCOP1n, cE3n, cE4, cLUX, def, m10, m9, p21, p25, p26);  // modifiers: cLUX, cE4, cE3n, cCOP1d, cCOP1n; isVersionOf GO:0006461
  cEC_degr: cEC => ; def*function_4_cEC_degr(L, cCOP1d, cCOP1n, cE3n, cEC, cEG, cG, d, g7, m10, m19, m32, m9, p17, p18, p24, p28, p29, p31);  // modifiers: cCOP1n, cCOP1d, cG, cE3n, cEG; isVersionOf GO:0030163
  cABAR_m_trscr: => cABAR_m; default*function_4_cABAR_m_trscr_1(cL, cT, def, e, g24, g28, n17, g);  // modifiers: cT, cL; isVersionOf GO:0009299
  cABAR_m_degr: cABAR_m => ; default*function_4_cABAR_m_degr(def, m37, cABAR_m);  // isVersionOf GO:0006402
  cPP2C_act: => cPP2C; default*function_4_cPP2C_act_1(def, g27, g29, p33, A0, h, cABAR_m);  // modifiers: cABAR_m; isVersionOf GO:0031401
  cPP2C_degr: cPP2C => ; default*function_4_cPP2C_degr_1(def, m39, cPP2C);  // isVersionOf GO:0030163
  cSnRK2_degr: cSnRK2 => ; default*function_4_cSnRK2_degr(def, m30, cPP2C, cSnRK2);  // modifiers: cPP2C; isVersionOf GO:0030163
  cSnRK2_act: => cSnRK2; default*function_4_cSnRK2_act_1(def, p32);  // isVersionOf GO:0031401
  cs_act: => cs; default*function_4_cs_act_1(L, def, i, g26, n18, n19, cSnRK2, cs);  // modifiers: cSnRK2; isVersionOf GO:0031401
  cs_degr: cs => ; default*function_4_cs_degr_1(def, m29, cs);  // isVersionOf GO:0030163

  // Unit definitions:
  unit volume = 1e-6 litre;
  unit time = 3600 second;
  unit substance = 1e-9 mole;
end
