// SBML level 2 version 4
// This model was downloaded from BioModels Database
// http://www.ebi.ac.uk/biomodels/

model MODEL1305030002()
  // Smallbone2013 - Metabolic Control Analysis - Example 3
  // Metabolic control analysis (MCA) is a biochemical formalism, defining how variables, such as fluxes and concentrations, depend on network parameters. In this paper, owing to its limitations, it is shown with three example models (MODEL1305030000-2) that the algorithm with slight modification can be applied to all models.
  // This model is described in the article:
  // Metabolic Control Analysis: Rereading Reder
  // Kieran Smallbone
  // Quantitative Methods; Tue, 28 May 2013.
  // Abstract:
  // Metabolic control analysis is a biochemical formalism defined by Kacser and Burns in 1973, and given firm mathematical basis by Reder in 1988. The algorithm defined by Reder for calculating the control matrices is still used by software programs today, but is only valid for some biochemical models. We show that, with slight modification, the algorithm may be applied to all models.
  // This model is hosted on BioModels Database and identified by: MODEL1305030000 .
  // To cite BioModels Database, please use: BioModels Database: An enhanced, curated and annotated resource for published quantitative kinetic models .
  // To the extent possible under law, all copyright and related or neighbouring rights to this encoded model have been dedicated to the public domain worldwide. Please refer to CC0 Public Domain Dedication for more information.
  // biomodels.db:MODEL1305030002
  // biomodels.db:BIOMD0000000456
  // hasTaxon taxonomy:131567
  // hasProperty mamo:MAMO_0000046
  // isVersionOf GO:0051098

  // Compartments:
  compartment cell = 1;  // GO:0005623

  // Species:
  species x1 in cell = 0.05625738;
  species x2 in cell = 0.7687615;
  species x3 in cell = 4.231238;
  species $y1 in cell = 10;
  species $y2 in cell = 0;
  species $y3 in cell = 0;
  species $y4 in cell = 1;
  species $y5 in cell = 1;
  species $y7 in cell = 1;
  species x4 in cell = 1;
  species $y8 in cell = 0;

  // Reactions:
  v1: $y1 + x2 -> x1 + x3; e1*(p1*y1*x2 - x1*x3)/(1 + y1 + x2 + x1 + x3 + y1*x2 + x1*x3);
    e1 = 1 dimensionless; p1 = 10 dimensionless;
  v2: $y4 + x3 -> $y5 + x2; e2*(p2*y4*x3 - y5*x2)/(1 + x3 + x2 + y4 + y5 + x3*y4 + x2*y5);
    e2 = 1 dimensionless; p2 = 10 dimensionless;
  v3: x1 -> $y2; e3*(p3*x1 - y2)/(1 + x1 + y2);
    e3 = 1 dimensionless; p3 = 50 dimensionless;
  v4: x1 -> $y3; e4*(p4*x1 - y3)/(1 + x1 + y3);
    e4 = 1 dimensionless; p4 = 10 dimensionless;
  v6: $y7 -> x4; e6*p6*y7;
    e6 = 1 dimensionless; p6 = 1 dimensionless;
  v7: x4 -> $y8; e7*p7;
    e7 = 1 dimensionless; p7 = 1 dimensionless;

  // Unit definitions:
  unit substance = dimensionless;
  unit time = dimensionless;
  unit volume = dimensionless;
end
