// SBML level 2 version 4
// This model was downloaded from BioModels Database
// http://www.ebi.ac.uk/biomodels/

model MODEL1302180003()
  // Koo2013 - Shear stress induced calcium influx and eNOS activation - Model 1
  // biomodels.db:MODEL1302180003
  // biomodels.db:BIOMD0000000464
  // isDescribedBy pubmed:23708369
  // hasTaxon taxonomy:9606
  // hasPart GO:0070509
  // hasPart reactome:REACT_12443.3

  // Compartments:
  compartment default = 1 volume;  // GO:0005576
  compartment Cell in default = 1 volume;  // GO:0005623
  compartment ER in Cell = 1 volume;  // GO:0005783

  // Species:
  substanceOnly species Ca_ex in default = 1500000;  // CHEBI:29108; occursIn GO:0005576
  substanceOnly species Ca_s in ER = 2830000;  // CHEBI:29108
  substanceOnly species Ca_c in Cell = 117.2;  // CHEBI:29108; occursIn GO:0005623
  substanceOnly species Ca_B in Cell = 3870;  // occursIn GO:0005623; hasPart CHEBI:29108
  substanceOnly species s5 in default = 0;
  substanceOnly species IP3 in Cell = 0;  // isVersionOf CHEBI:203600
  substanceOnly species s7 in Cell = 0;
  substanceOnly species s8 in Cell = 0;
  substanceOnly species s9 in Cell = 0;
  substanceOnly species s10 in Cell = 0;
  substanceOnly species s11 in Cell = 0;
  substanceOnly species TimeT in default = 0;
  substanceOnly species s13 in default = 0;
  substanceOnly species Shear_Stress in default = 0;

  // Parameters:
  R_T = 44000 dimensionless;
  k1 = 0.0006 sub_sec;
  k2 = 1 inv_sec;
  k3 = 3.32 inv_sec;
  k4 = 2500 sub_sec;
  k5 = 5e-11 inv_sec_sub;
  k6 = 0.05 inv_sec_sub;
  k7 = 150 inv_sec;
  K1 = 0 substance;
  K2 = 200 substance;
  K3 = 150 substance;
  K4 = 80 substance;
  K5 = 321 substance;
  K_hi = 380 substance;
  k_CICR = 1 dimensionless;
  K_CICR = 0 substance;
  k_CCE = 0 inv_sec_sub;
  B_T = 120000 substance;
  dot_Vp = 815 sub_sec;
  dot_Vex = 9165 sub_sec;
  dot_Vhi = 2380 sub_sec;
  dot_q_inpass = 3000 sub_sec;
  Cao = 100 substance;
  tau_I = 66 substance;
  tau_II = 0.01 substance;
  half = 0.5 dimensionless;
  fracK = 7.07106781e6 substance;

  // Reactions:
  re1: Ca_B => Ca_c; -k6*Ca_c*(B_T - Ca_B) + k7*Ca_B;
  re4: s5 => Ca_s; k_CCE*(fracK*Cao/(K3 + Cao) - Ca_s)*(Ca_ex - Ca_s);  // modifiers: Ca_ex
  re5: s7 => IP3; k1*(R_T - half*R_T*(exp(-TimeT/tau_I) + exp(-TimeT/tau_II) + (exp(-TimeT/tau_I) - exp(-TimeT/tau_II))*(tau_I + tau_II)/(tau_I - tau_II)))*Ca_c/(K1 + Ca_c);  // modifiers: Ca_c, TimeT, Shear_Stress
  re6: IP3 => s8; k2*IP3;
  re7: Ca_s => Ca_c; k3*(k_CICR*Ca_c/(K_CICR + Ca_c))*(IP3/(K2 + IP3))^3*Ca_s - k4*(Ca_c/(K3 + Ca_c))^2 + k5*Ca_s*Ca_s;  // modifiers: IP3
  re8: Ca_c => s9; dot_Vhi*Ca_c^4/(K_hi^4 + Ca_c^4);
  re9: Ca_c => s10; dot_Vex*Ca_c/(K5 + Ca_c);
  re10: s11 => Ca_c; dot_q_inpass;
  re11: s13 => TimeT; unisec;
    unisec = 1 sub_sec;
  re12: Ca_c => s9; dot_Vp*Ca_c^2/(K4^2 + Ca_c^2);

  // Unit definitions:
  unit time = second;
  unit substance = 1e-9 mole;
  unit area = metre^2;
  unit length = metre;
  unit volume = litre;
  unit sub_sec = 1e-9 mole / second;
  unit inv_sec = 1 / second;
  unit inv_sec_sub = 1 / (1e-9 mole * second);
  unit nM_inv_s = 1e-9 mole / second;
  unit inv_nM_s = 1 / (1e-9 mole * second);
end
