// SBML level 2 version 4
// This model was downloaded from BioModels Database
// http://www.ebi.ac.uk/biomodels/

model MODEL1306190003()
  // Smallbone2013 - Colon Crypt cycle - Version 3
  // This model is described in the article:
  // A mathematical model of the colon crypt capturing compositional dynamic interactions between cell types
  // Kieran Smallbone, Bernard M. Corfe
  // Int J Exp Pathol. 2014 Feb;95(1):1-7.
  // Abstract:
  // Models of the development and early progression of colorectal cancer are based upon understanding the cycle of stem cell turnover, proliferation, differentiation and death. Existing crypt compartmental models feature a linear pathway of cell types, with little regulatory mechanism. Previous work has shown that there are perturbations in the enteroendocrine cell population of macroscopically normal crypts, a compartment not included in existing models. We show that existing models do not adequately recapitulate the dynamics of cell fate pathways in the crypt. We report the progressive development, iterative testing and fitting of a developed compartmental model with additional cell types, and which includes feedback mechanisms and cross-regulatory mechanisms between cell types. The fitting of the model to existing data sets suggests a need to invoke cross-talk between cell types as a feature of colon crypt cycle models.
  // This model is hosted on BioModels Database and identified by: MODEL1306190003 .
  // To cite BioModels Database, please use: BioModels Database: An enhanced, curated and annotated resource for published quantitative kinetic models .
  // To the extent possible under law, all copyright and related or neighbouring rights to this encoded model have been dedicated to the public domain worldwide. Please refer to CC0 Public Domain Dedication for more information.
  // biomodels.db:MODEL1306190003
  // biomodels.db:BIOMD0000000517
  // isDescribedBy pubmed:24354351
  // biomodels.db:MODEL1306190003
  // isDerivedFrom biomodels.db:BIOMD0000000518
  // hasTaxon taxonomy:39107

  // Compartments:
  compartment compartment = 1; compartment is "crypt";  // isVersionOf BTO:0000305

  // Species:
  species N0 in compartment = 1.715898/compartment;  // isVersionOf CL:0000034
  species N1 in compartment = 26.80367/compartment;  // isVersionOf CL:0000034
  species N2 in compartment = 44.61678/compartment;  // isVersionOf CL:0000034
  species N3 in compartment = 1.536463/compartment;

  // Parameters:
  d0 = 0.02 per_day;
  d1 = 0.5480597 per_day;
  d2 = 1.888677 per_day;
  T has cell; T is "cellularity";
  K = 106.0904 cell; K is "capacity";
  r0 = 1.998624 per_day;
  f0 has cell_per_day; f0 is "N0 division rate";
  p00 has dimensionless;
  p01 = 0.6313781 dimensionless;
  r1 = 10.58582 per_day;
  f1 has cell_per_day; f1 is "N1 division rate";
  p11 has dimensionless;
  p12 = 0.805046 dimensionless;
  p03 has dimensionless;
  q03 = 0.9351494 dimensionless;
  K03 = 0.7836567 cell;
  d3 = 0.1677359 per_day;
  K0X = 0.1536463 cell;
  K1X = 15.36456 cell;
  K2X = 2.704058 cell;

  // Assignment rules:
  T := N0 + N1 + N2 + N3;
  f0 := r0*N0*(1 - T/K);
  p00 := 1 - p01 - p03;
  f1 := r1*N1*(1 - T/K);
  p11 := 1 - p12;
  p03 := q03*K03/(N3 + K03);

  // Reactions:
  R0X: N0 => ; d0*N0*K0X/(N3 + K0X); R0X is "N0 death";  // modifiers: N3
  N0_differentiation_to_N1: N0 => N0 + N1; p01*f0;
  N0_renewal: N0 => 2 N0; p00*f0;
  R1X: N1 => ; d1*N1*K1X/(N3 + K1X); R1X is "N1 death";  // modifiers: N3
  N1_differentiation: N1 => N1 + N2; p12*f1;
  N1_renewal: N1 => 2 N1; p11*f1;
  R2X: N2 => ; d2*N2*K2X/(N3 + K2X); R2X is "N2 death";  // modifiers: N3
  N0_differentiation_to_N3: N0 => N0 + N3; p03*f0;
  R3X: N3 => ; d3*N3; R3X is "N3 death";

  // Unit definitions:
  unit substance = item; substance is "cell";
  unit time = 86400 second; time is "day";
  unit volume = dimensionless;
  unit per_day = 1 / (86400 second);
  unit cell = item;
  unit cell_per_day = item / (86400 second);
end
