// SBML level 2 version 4
// This model was downloaded from BioModels Database
// http://www.ebi.ac.uk/biomodels/

function Function_for_reaction_4_4(kIL6Decay, serum, IL6_serum)
  kIL6Decay*IL6_serum/serum;
end

function Function_for_reaction_5_4(kCRPDecay, CRP_serum, serum)
  kCRPDecay*CRP_serum/serum;
end

function Function_for_reaction_16_4(kRAct, liver, R_IL6_gp130_liver)
  kRAct*R_IL6_gp130_liver/liver;
end

function Function_for_reaction_1_4(kRLOff, kRLOn, sR_IL6_serum, sR_serum, serum, IL6_serum)
  (kRLOn*sR_serum*IL6_serum - kRLOff*sR_IL6_serum)/serum;
end

function Function_for_reaction_3_4(kIL6Synth, serum)
  kIL6Synth/serum;
end

function Function_for_reaction_6_4(kgp130Off, kgp130On, sR_IL6_liver, gp130_liver, liver, R_IL6_gp130_liver)
  (kgp130On*sR_IL6_liver*gp130_liver - kgp130Off*R_IL6_gp130_liver)/liver;
end

function Function_for_reaction_46_4(kRAct, R_IL6_gp130_gut, gut)
  kRAct*R_IL6_gp130_gut/gut;
end

function Function_for_reaction_42_4(STAT3_gut, Ractive_gut, kcatSTATPhos, KmSTATPhos, gut)
  kcatSTATPhos*Ractive_gut*STAT3_gut/(KmSTATPhos + STAT3_gut)/gut;
end

function Function_for_reaction_43_4(pSTAT3_gut, VmSTATDephos, gut, KmSTATDephos)
  VmSTATDephos*pSTAT3_gut/(KmSTATDephos + pSTAT3_gut)/gut;
end

function Function_for_reaction_44_4(kRint, R_IL6_gp130_gut, gut)
  kRint*R_IL6_gp130_gut/gut;
end

function Function_for_reaction_45_4(Ractive_gut, gut, kintActiveR)
  kintActiveR*Ractive_gut/gut;
end

function function_23(Ractive_liver, VmRDephos, liver, KmRDephos)
  VmRDephos*Ractive_liver/(KmRDephos + Ractive_liver)/liver;
end
function_23 is "Function for mwb675e13a_26c0_4b18_a8c3_0f5a62090ba4_4";

function function_24(VmRDephos, Ractive_gut, gut, KmRDephos)
  VmRDephos*Ractive_gut/(KmRDephos + Ractive_gut)/gut;
end
function_24 is "Function for mw64df7c9e_35da_4c7f_be56_c5dabfb060b6_4";

function function_25(kRsynth, liver)
  kRsynth/liver;
end
function_25 is "Function for mw391f3b8e_5649_4851_b2e2_782cb3e015b6_4";

function function_26(kRdeg, gp130_liver, liver)
  kRdeg*gp130_liver/liver;
end
function_26 is "Function for mw4a00a3a4_778f_4952_8100_2dc3cc2b7046_4";

function Function_for_reaction_2_4(kgp130Off, kgp130On, sR_IL6_serum, serum, sR_IL6_sgp130_serum, sgp130_serum)
  (kgp130On*sR_IL6_serum*sgp130_serum - kgp130Off*sR_IL6_sgp130_serum)/serum;
end

function Function_for_reaction_7_4(kRLOff, kRLOn, IL6_liver, R, R_IL6, liver)
  (kRLOn*R*IL6_liver - kRLOff*R_IL6)/liver;
end

function function_27(kRsynth, gut)
  kRsynth/gut;
end
function_27 is "Function for mw6db30657_4e56_4c3a_8575_9c67393dde4f_4";

function function_28(kRdeg, gp130_gut, gut)
  kRdeg*gp130_gut/gut;
end
function_28 is "Function for mw6f470e13_f0e4_4294_83d8_59dd5670d10c_4";

function function_29(kRLOff, kRLOn, IL6_gut, sR_IL6_gut, sR_gut, gut)
  (kRLOn*sR_gut*IL6_gut - kRLOff*sR_IL6_gut)/gut;
end
function_29 is "Function for mw4c099d5c_200f_474e_8ec1_59e9223a8afd_4";

function function_30(kRLOff, kRLOn, IL6_liver, sR_liver, sR_IL6_liver, liver)
  (kRLOn*sR_liver*IL6_liver - kRLOff*sR_IL6_liver)/liver;
end
function_30 is "Function for mwa812f08f_1035_42bd_82d2_72d691308f88_4";

function function_31(kCRPSecretion, liver, CRP_liver)
  kCRPSecretion*CRP_liver/liver;
end
function_31 is "Function for mwab0012ac_e5f2_4904_9893_820fd210402e_4";

function function_32(serum, ksynthCRP)
  ksynthCRP/serum;
end
function_32 is "Function for mwff2ebcf1_dcf1_47b9_9cac_7306fc6f7f76_4";

function Function_for_reaction_8_4(kgp130Off, kgp130On, R_IL6, gp130_liver, liver, R_IL6_gp130_liver)
  (kgp130On*R_IL6*gp130_liver - kgp130Off*R_IL6_gp130_liver)/liver;
end

function Function_for_reaction_11_4(kRint, R_IL6, liver)
  kRint*R_IL6/liver;
end

function Function_for_reaction_12_4(kRint, liver, R_IL6_gp130_liver)
  kRint*R_IL6_gp130_liver/liver;
end

function Function_for_reaction_13_4(Ractive_liver, liver, kintActiveR)
  kintActiveR*Ractive_liver/liver;
end

function Function_for_reaction_14_4(kRsynth, liver)
  kRsynth/liver;
end

function Function_for_reaction_41_4(kgp130Off, kgp130On, sR_IL6_gut, R_IL6_gp130_gut, gp130_gut, gut)
  (kgp130On*sR_IL6_gut*gp130_gut - kgp130Off*R_IL6_gp130_gut)/gut;
end

function function_43(serum, sR_IL6_sgpFc_serum, kdegAb)
  kdegAb*sR_IL6_sgpFc_serum/serum;
end
function_43 is "Function for mw14d351b9_623a_48e8_a21c_854411039120_3";

function function_44(serum, kdegAb, sgpFc_serum)
  kdegAb*sgpFc_serum/serum;
end
function_44 is "Function for mwba7f4605_8571_439b_b3ab_eb0b43808db8_4";

function function_45(sR_IL6_sgpFc_gut, kdegAb, gut)
  kdegAb*sR_IL6_sgpFc_gut/gut;
end
function_45 is "Function for mw5be6711a_526a_4a58_80c6_d353dcabdf87_3";

function function_46(kgp130Off, kgp130On, sR_IL6_sgpFc_gut, sR_IL6_gut, gut, sgpFc_gut)
  (kgp130On*sgpFc_gut*sR_IL6_gut - kgp130Off*sR_IL6_sgpFc_gut)/gut;
end
function_46 is "Function for mw1d3068d7_5679_41ee_9892_984e33012070_1";

function function_47(kgp130Off, kgp130On, sR_IL6_sgpFc_liver, sgpFc_liver, sR_IL6_liver, liver)
  (kgp130On*sgpFc_liver*sR_IL6_liver - kgp130Off*sR_IL6_sgpFc_liver)/liver;
end
function_47 is "Function for mwb341c690_7147_46a1_8577_201598de3bf1_1";

function function_48(sR_IL6_sgpFc_liver, liver, kdegAb)
  kdegAb*sR_IL6_sgpFc_liver/liver;
end
function_48 is "Function for mw5d9fcd0c_ca08_4444_b509_2ea4777e0025_3";

function function_49(sgpFc_liver, liver, kdegAb)
  kdegAb*sgpFc_liver/liver;
end
function_49 is "Function for mw2ae288ab_7d03_4a84_a024_c711ad2b77e6_4";

function function_50(kdegAb, gut, sgpFc_gut)
  kdegAb*sgpFc_gut/gut;
end
function_50 is "Function for mw9629d028_fcc0_4886_9e4d_36eecdb0381d_4";

function function_33(kgp130Off, kgp130On, sR_IL6_sgp130_gut, sR_IL6_gut, sgp130_gut, gut)
  (kgp130On*sgp130_gut*sR_IL6_gut - kgp130Off*sR_IL6_sgp130_gut)/gut;
end
function_33 is "Function for mw8be158f1_ea81_45bf_80d4_6e31cd83fe6c_4";

function function_34(kgp130Off, kgp130On, sgp130_liver, sR_IL6_liver, liver, sR_IL6_sgp130_liver)
  (kgp130On*sR_IL6_liver*sgp130_liver - kgp130Off*sR_IL6_sgp130_liver)/liver;
end
function_34 is "Function for mwd77df15b_fed7_41a8_a3d6_b0f6c590c5f6_4";

function function_35(serum, ksynthsR)
  ksynthsR/serum;
end
function_35 is "Function for mw432fde6e_59ab_47f0_9fb1_086433a602e3_4";

function function_36(sR_serum, serum, kdegsR)
  kdegsR*sR_serum/serum;
end
function_36 is "Function for mw41c27823_d7ee_4554_9eac_3d5beec8e854_4";

function function_37(ksynthsgp130, serum)
  ksynthsgp130/serum;
end
function_37 is "Function for mw50c6744c_e883_4612_8663_e38750cbad1b_4";

function function_38(serum, sgp130_serum, kdegsgp130)
  kdegsgp130*sgp130_serum/serum;
end
function_38 is "Function for mwb6a99eb5_ea4c_4733_98dd_1daf5ec6b0db_4";

function function_39(ksynthIL6Gut, gut)
  ksynthIL6Gut/gut;
end
function_39 is "Function for mw1ce0c484_681f_4d85_8ffe_392d0c100cfa_4";

function function_40(kdegIL6Gut, IL6_gut, gut)
  kdegIL6Gut*IL6_gut/gut;
end
function_40 is "Function for mwf913ea0b_785a_4701_ac91_b18ab5dd5a89_4";

function function_41(CRP_serum, serum, kRShedding)
  kRShedding*CRP_serum/serum;
end
function_41 is "Function for mw71d90b81_8211_4039_8807_12a7fe03206c_4";

function function_42(kgp130Off, kgp130On, sR_IL6_serum, serum, sR_IL6_sgpFc_serum, sgpFc_serum)
  (kgp130On*sgpFc_serum*sR_IL6_serum - kgp130Off*sR_IL6_sgpFc_serum)/serum;
end
function_42 is "Function for mwc32a28fa_525c_44af_8d2c_e728c21eb90a_1";

function Function_for_reaction_9_4(Ractive_liver, STAT3_liver, liver, kcatSTATPhos, KmSTATPhos)
  kcatSTATPhos*Ractive_liver*STAT3_liver/(KmSTATPhos + STAT3_liver)/liver;
end

function Function_for_reaction_10_4(pSTAT3_liver, liver, VmSTATDephos, KmSTATDephos)
  VmSTATDephos*pSTAT3_liver/(KmSTATDephos + pSTAT3_liver)/liver;
end

function Function_for_reaction_15_4(kRdeg, R, liver)
  kRdeg*R/liver;
end

model MODEL1408050003()
  // Dwivedi2014 - Crohns IL6 Disease model - sgp130 activity
  // This model is comprised of four models:
  // [BIOMD0000000534] Healthy Volunteer model
  // [BIOMD0000000535] Crohn's Disease - IL-6 Antibody
  // [BIOMD0000000536] Crohn's Disease - sgp130FC
  // [BIOMD0000000537] Crohn's Disease - IL-6Ra Antibody
  // Possible avenues for Interleukin-6 (IL-6) inhibition in treating Crohn's disease are compared here. Each model refers to separate ligands. The system simulates differential activity of the ligands on the signalling of IL-6. This affects Signal Transducer and Activator of Transcription 3 (STAT3) activity on the production of biomarker C-Reactive Protein (CRP) expression.
  // The figure referring to this Crohn's Disease model is 6b.
  // This model is described in the article:
  // A multiscale model of interleukin-6-mediated immune regulation in Crohn's disease and its application in drug discovery and development.
  // Dwivedi G, Fitz L, Hegen M, Martin SW, Harrold J, Heatherington A, Li C.
  // CPT Pharmacometrics Syst Pharmacol 2014; 3: e89
  // Abstract:
  // In this study, we have developed a multiscale systems model of interleukin (IL)-6-mediated immune regulation in Crohn's disease, by integrating intracellular signaling with organ-level dynamics of pharmacological markers underlying the disease. This model was linked to a general pharmacokinetic model for therapeutic monoclonal antibodies and used to comparatively study various biotherapeutic strategies targeting IL-6-mediated signaling in Crohn's disease. Our work illustrates techniques to develop mechanistic models of disease biology to study drug-system interaction. Despite a sparse training data set, predictions of the model were qualitatively validated by clinical biomarker data from a pilot trial with tocilizumab. Model-based analysis suggests that strategies targeting IL-6, IL-6R?, or the IL-6/sIL-6R? complex are less effective at suppressing pharmacological markers of Crohn's than dual targeting the IL-6/sIL-6R? complex in addition to IL-6 or IL-6R?. The potential value of multiscale system pharmacology modeling in drug discovery and development is also discussed.CPT: Pharmacometrics & Systems Pharmacology (2014) 3, e89; doi:10.1038/psp.2013.64; advance online publication 8 January 2014.
  // This model is hosted on BioModels Database and identified by: BIOMD0000000536.
  // To cite BioModels Database, please use: BioModels Database: An enhanced, curated and annotated resource for published quantitative kinetic models.
  // To the extent possible under law, all copyright and related or neighbouring rights to this encoded model have been dedicated to the public domain worldwide. Please refer to CC0 Public Domain Dedication for more information.
  // biomodels.db:/MODEL1408050003
  // biomodels.db:/BIOMD0000000536
  // isDescribedBy pubmed:24402116
  // isPartOf reactome:REACT_27307.1
  // hasVersion DOID:8778
  // isVersionOf GO:0004915

  // Compartments:
  compartment serum = 1;  // isVersionOf BTO:0001239
  compartment liver = 1;  // isVersionOf BTO:0000759
  compartment gut = 1;
  compartment peripheral = 1;  // isVersionOf GO:0005615

  // Species:
  species IL6_serum in serum = 0.0004356289/serum;  // isVersionOf uniprot:/P05231
  species sgp130_serum in serum = 3.9/serum;  // hasProperty PATO:0001537; isVersionOf PR:000001868
  species sR_IL6_sgp130_serum in serum = 0.08740607/serum;  // hasPart uniprot:/P08887 uniprot:/P05231 PR:000001868; hasProperty PATO:0001537
  species CRP_serum in serum = 221.0637/serum;  // isVersionOf uniprot:/P02741
  species sR_serum in serum = 4.253507/serum;  // hasProperty PATO:0001537; isVersionOf uniprot:/P08887
  species sR_IL6_serum in serum = 0.001094243/serum;  // isVersionOf uniprot:/P08887 uniprot:/P05231; hasProperty PATO:0001537
  species sgpFc_serum in serum = -1.225754e-26/serum;  // isVersionOf FMA:62871
  species sR_IL6_sgpFc_serum in serum = -2.294737e-28/serum;  // hasPart uniprot:/P08887 uniprot:/P05231 FMA:62871; hasProperty PATO:0001537
  species gp130_liver in liver = 0.3889589/liver;  // isVersionOf PR:000001868
  species R_IL6_gp130_liver in liver = 6.599359e-5/liver;  // hasPart uniprot:/P08887 uniprot:/P05231 PR:000001868
  species sR_IL6_liver in liver = 0.0009761649/liver;  // hasPart uniprot:/P08887 uniprot:/P05231; hasProperty PATO:0001537
  // nM 4500 copies per cell on rat hepatocytes. Assuming same volume as HepG2 (2.8pL) gives 0.27 nM concentration.
  species R in liver = 0.4382358/liver;  // isVersionOf uniprot:/P08887
  species IL6_liver in liver = 0.0007256658/liver;  // isVersionOf uniprot:/P05231
  species R_IL6 in liver = 1.600365e-5/liver;  // hasPart uniprot:/P08887 uniprot:/P05231
  species Ractive_liver in liver = 0.7654165/liver;  // hasProperty PATO:0002354; hasPart uniprot:/P08887 uniprot:/P05231 PR:000001868
  species STAT3_liver in liver = 0.7775373/liver;  // isVersionOf PR:000002089
  species pSTAT3_liver in liver = 9.222463/liver;  // isVersionOf PR:000002089
  species $CRP_liver in liver;  // isVersionOf uniprot:/P02741
  species sR_liver in liver = 6.087047/liver;  // hasProperty PATO:0001537; isVersionOf uniprot:/P08887
  species CRPExtracellular in liver = 409.7753/liver;  // isVersionOf uniprot:/P02741
  species sgp130_liver in liver = 5.589699/liver;  // hasProperty PATO:0001537; isVersionOf PR:000001868
  species sR_IL6_sgp130_liver in liver = 0.1163437/liver;  // hasProperty PATO:0001537; hasPart uniprot:/P05231 uniprot:/P08887 PR:000001868
  species sR_IL6_sgpFc_liver in liver = -1.68121e-27/liver;  // hasPart uniprot:/P08887 uniprot:/P05231 FMA:62871; hasProperty PATO:0001537
  species sgpFc_liver in liver = -6.979197e-26/liver;  // isVersionOf FMA:62871
  species sR_IL6_gut in gut = 0.001306824/gut;  // hasPart uniprot:/P05231 uniprot:/P08887; hasProperty PATO:0001537
  species gp130_gut in gut = 0.3749627/gut;  // isVersionOf PR:000001868
  species R_IL6_gp130_gut in gut = 8.448905e-5/gut;  // hasPart uniprot:/P05231 uniprot:/P08887 PR:000001868
  species Ractive_gut in gut = 0.9802725/gut;  // hasProperty PATO:0002354; hasPart uniprot:/P05231 uniprot:/P08887 PR:000001868
  species STAT3_gut in gut = 0.610636/gut;  // isVersionOf PR:000002089
  species pSTAT3_gut in gut = 9.389364/gut;  // isVersionOf PR:000002089
  species $geneProduct in gut;  // isVersionOf CCO:U0000003
  species sR_gut in gut = 6.064107/gut;  // hasProperty PATO:0001537; isVersionOf uniprot:/P08887
  species IL6_gut in gut = 0.009348199/gut;  // isVersionOf uniprot:/P05231
  species sgp130_gut in gut = 5.569739/gut;  // hasProperty PATO:0001537; isVersionOf PR:000001868
  species sR_IL6_sgp130_gut in gut = 0.1363039/gut;  // hasProperty PATO:0001537; hasPart uniprot:/P08887 uniprot:/P05231 PR:000001868
  species sgpFc_gut in gut = -5.462789e-28/gut;  // isVersionOf FMA:62871
  species sR_IL6_sgpFc_gut in gut = 5.325366e-28/gut;  // hasProperty PATO:0001537; hasPart uniprot:/P08887 uniprot:/P05231 FMA:62871
  species sgpFc_peripheral in peripheral = -6.85083e-27/peripheral;  // isVersionOf FMA:62871
  species $CRP_Suppression in serum; CRP_Suppression is "CRP Suppression (%)";  // isVersionOf uniprot:/P02741

  // Parameters:
  kRLOn = 0.384;
  kRLOff = 1.92;
  // 1/(nM.hr)
  kgp130On = 20.52;
  kgp130Off = 1.026;
  kRAct = 155;
  // 1/hr (Estimated using the receptor internalization model)
  kRint = 1.96;
  kRsynth = 0.0685;
  // 1/hr Estimated from receptor model.
  kRdeg = 0.1561; kRdeg is "kRintBasal";
  kIL6Synth = 0.0063; kIL6Synth is "ksynthIL6";
  // 1/hr Estimated from drug PK models
  kIL6Decay = 34.82; kIL6Decay is "kdegIL6";
  kCRPDecay = 0.36; kCRPDecay is "kdegCRP";
  KmSTATDephos = 5.34;
  VmSTATDephos = 0.62;
  // 18 nM/hr
  VmRDephos = 0.525;
  KmRDephos = 155.3;
  // 1/hr
  kcatSTATPhos = 145;
  KmSTATPhos = 219;
  KmProtSynth = 10;
  // nM Commonly used model of protein synthesis: mRNA: dm/dt = Sm*TF/(C + TF) - Dm*m Protein: dn/dt = Sn*m - Dn*n Solving for st. st: n(ss) = (Sn/Dn)*(Sm/Dm)*TF/(C+TF) VmProtSynth = (Sn/Dn)*(Sm/Dm) = 4875000 KmProtSynth = C = 108 The parameters are obtained from Moya et al. (2010), who estimate these parameters for IL6 signaling. The actual value used may be different, as it was optimized to fit the data
  VmProtSynth = 330;
  kCRPSecretion = 0.5;
  // nM/hr Calculated to maintain CRP level in HD at 40 nM in basal state.
  ksynthCRP = 0.42;
  ksynthsR = 0.1;
  kdegsR = 0.3;
  ksynthsgp130 = 3.9;
  // 1/hr Arbitrarily set to 1. The synthesis rate is adjusted to get the desired steady state value.
  kdegsgp130 = 1;
  ksynthIL6Gut = 0.036;
  kdegIL6Gut = 1;
  kdistTissueToSerum = 0.8473;
  // au Value chosen to ensure that proteins distribute between serum and tissue in a manner that the tissue conc. is a fixed proportion of the serum conc.
  kdistSerumToTissue = 1.2125;
  kRShedding = 0.0054;
  kintActiveR = 0.01;
  infusionTime = 1;
  kAbSerumToLiver = QSerumLiver/VSerum;
  kAbLiverToSerum = QSerumLiver/VLiver;
  kAbSerumToGut = QSerumGut/VSerum;
  kAbGutToSerum = QSerumGut/VGut;
  VSerum = 2.88;
  VLiver = 2.88;
  VGut = 1.44;
  VPeriph = 0.576;
  QSerumLiver = 0.06;
  QSerumGut = 0.03;
  QSerumPeriph = 0.001;
  // Def: 0.0036
  kAbSerumToPeriph = QSerumPeriph/VSerum;
  kAbPeriphToSerum = QSerumPeriph/VPeriph;
  kdegAb = 0.0018;
  Dose_Q1W = 0;
  Dose_Q2W = 0;
  Dose_Q4W = 0;
  Initial_for_CRP = CRP_serum;
  Initial_for_Dose_Q1W = Dose_Q1W;
  Initial_for_Dose_Q2W = Dose_Q2W;
  Initial_for_Dose_Q4W = Dose_Q4W;

  // Assignment rules:
  CRP_Suppression := (CRP_serum - Initial_for_CRP)/(Initial_for_CRP/(-100));
  geneProduct := VmProtSynth*pSTAT3_gut/(KmProtSynth + pSTAT3_gut);
  CRP_liver := VmProtSynth*pSTAT3_liver/(KmProtSynth + pSTAT3_liver);

  // Reactions:
  reaction_1: sR_serum + IL6_serum -> sR_IL6_serum; serum*Function_for_reaction_1_4(kRLOff, kRLOn, sR_IL6_serum, sR_serum, serum, IL6_serum);
  reaction_2: sR_IL6_serum + sgp130_serum -> sR_IL6_sgp130_serum; serum*Function_for_reaction_2_4(kgp130Off, kgp130On, sR_IL6_serum, serum, sR_IL6_sgp130_serum, sgp130_serum);
  reaction_3: => IL6_serum; serum*Function_for_reaction_3_4(kIL6Synth, serum);
  reaction_4: IL6_serum => ; serum*Function_for_reaction_4_4(kIL6Decay, serum, IL6_serum);
  reaction_5: CRP_serum => ; serum*Function_for_reaction_5_4(kCRPDecay, CRP_serum, serum);
  reaction_6: sR_IL6_liver + gp130_liver -> R_IL6_gp130_liver; liver*Function_for_reaction_6_4(kgp130Off, kgp130On, sR_IL6_liver, gp130_liver, liver, R_IL6_gp130_liver);
  reaction_7: R + IL6_liver -> R_IL6; liver*Function_for_reaction_7_4(kRLOff, kRLOn, IL6_liver, R, R_IL6, liver);
  reaction_8: R_IL6 + gp130_liver -> R_IL6_gp130_liver; liver*Function_for_reaction_8_4(kgp130Off, kgp130On, R_IL6, gp130_liver, liver, R_IL6_gp130_liver);
  reaction_16: R_IL6_gp130_liver => Ractive_liver; liver*Function_for_reaction_16_4(kRAct, liver, R_IL6_gp130_liver);
  reaction_9: STAT3_liver + Ractive_liver => pSTAT3_liver + Ractive_liver; liver*Function_for_reaction_9_4(Ractive_liver, STAT3_liver, liver, kcatSTATPhos, KmSTATPhos);
  reaction_10: pSTAT3_liver => STAT3_liver; liver*Function_for_reaction_10_4(pSTAT3_liver, liver, VmSTATDephos, KmSTATDephos);
  reaction_15: R => ; liver*Function_for_reaction_15_4(kRdeg, R, liver);
  reaction_11: R_IL6 => ; liver*Function_for_reaction_11_4(kRint, R_IL6, liver);
  reaction_12: R_IL6_gp130_liver => ; liver*Function_for_reaction_12_4(kRint, liver, R_IL6_gp130_liver);
  reaction_13: Ractive_liver => ; liver*Function_for_reaction_13_4(Ractive_liver, liver, kintActiveR);
  reaction_14: => R; liver*Function_for_reaction_14_4(kRsynth, liver);
  reaction_41: sR_IL6_gut + gp130_gut -> R_IL6_gp130_gut; gut*Function_for_reaction_41_4(kgp130Off, kgp130On, sR_IL6_gut, R_IL6_gp130_gut, gp130_gut, gut);
  reaction_46: R_IL6_gp130_gut => Ractive_gut; gut*Function_for_reaction_46_4(kRAct, R_IL6_gp130_gut, gut);
  reaction_42: STAT3_gut + Ractive_gut => pSTAT3_gut + Ractive_gut; gut*Function_for_reaction_42_4(STAT3_gut, Ractive_gut, kcatSTATPhos, KmSTATPhos, gut);
  reaction_43: pSTAT3_gut => STAT3_gut; gut*Function_for_reaction_43_4(pSTAT3_gut, VmSTATDephos, gut, KmSTATDephos);
  reaction_44: R_IL6_gp130_gut => ; gut*Function_for_reaction_44_4(kRint, R_IL6_gp130_gut, gut);
  reaction_45: Ractive_gut => ; gut*Function_for_reaction_45_4(Ractive_gut, gut, kintActiveR);
  reaction_119: Ractive_liver => R_IL6_gp130_liver; liver*function_23(Ractive_liver, VmRDephos, liver, KmRDephos);
  reaction_120: Ractive_gut => R_IL6_gp130_gut; gut*function_24(VmRDephos, Ractive_gut, gut, KmRDephos);
  reaction_121: => gp130_liver; liver*function_25(kRsynth, liver);
  reaction_122: gp130_liver => ; liver*function_26(kRdeg, gp130_liver, liver);
  reaction_123: => gp130_gut; gut*function_27(kRsynth, gut);
  reaction_124: gp130_gut => ; gut*function_28(kRdeg, gp130_gut, gut);
  reaction_125: sR_serum -> sR_gut; kdistSerumToTissue*sR_serum - kdistTissueToSerum*sR_gut;
  reaction_126: IL6_serum -> IL6_gut; kdistSerumToTissue*IL6_serum - kdistTissueToSerum*IL6_gut;
  reaction_127: sR_gut + IL6_gut -> sR_IL6_gut; gut*function_29(kRLOff, kRLOn, IL6_gut, sR_IL6_gut, sR_gut, gut);
  reaction_128: sR_IL6_serum -> sR_IL6_gut; kdistSerumToTissue*sR_IL6_serum - kdistTissueToSerum*sR_IL6_gut;
  reaction_129: sR_serum -> sR_liver; kdistSerumToTissue*sR_serum - kdistTissueToSerum*sR_liver;
  reaction_130: IL6_serum -> IL6_liver; kdistSerumToTissue*IL6_serum - kdistTissueToSerum*IL6_liver;
  reaction_131: sR_IL6_serum -> sR_IL6_liver; kdistSerumToTissue*sR_IL6_serum - kdistTissueToSerum*sR_IL6_liver;
  reaction_132: sR_liver + IL6_liver -> sR_IL6_liver; liver*function_30(kRLOff, kRLOn, IL6_liver, sR_liver, sR_IL6_liver, liver);
  reaction_133: $CRP_liver => CRPExtracellular; liver*function_31(kCRPSecretion, liver, CRP_liver);
  reaction_134: CRP_serum -> CRPExtracellular; kdistSerumToTissue*CRP_serum - kdistTissueToSerum*CRPExtracellular;
  reaction_135: => CRP_serum; serum*function_32(serum, ksynthCRP);
  reaction_136: sgp130_serum -> sgp130_gut; kdistSerumToTissue*sgp130_serum - kdistTissueToSerum*sgp130_gut;
  reaction_137: sgp130_serum -> sgp130_liver; kdistSerumToTissue*sgp130_serum - kdistTissueToSerum*sgp130_liver;
  reaction_138: sgp130_gut + sR_IL6_gut -> sR_IL6_sgp130_gut; gut*function_33(kgp130Off, kgp130On, sR_IL6_sgp130_gut, sR_IL6_gut, sgp130_gut, gut);
  reaction_139: sR_IL6_liver + sgp130_liver -> sR_IL6_sgp130_liver; liver*function_34(kgp130Off, kgp130On, sgp130_liver, sR_IL6_liver, liver, sR_IL6_sgp130_liver);
  reaction_140: sR_IL6_sgp130_serum -> sR_IL6_sgp130_gut; kdistSerumToTissue*sR_IL6_sgp130_serum - kdistTissueToSerum*sR_IL6_sgp130_gut;
  reaction_141: sR_IL6_sgp130_serum -> sR_IL6_sgp130_liver; kdistSerumToTissue*sR_IL6_sgp130_serum - kdistTissueToSerum*sR_IL6_sgp130_liver;
  reaction_142: => sR_serum; serum*function_35(serum, ksynthsR);
  reaction_143: sR_serum => ; serum*function_36(sR_serum, serum, kdegsR);
  reaction_144: => sgp130_serum; serum*function_37(ksynthsgp130, serum);
  reaction_145: sgp130_serum => ; serum*function_38(serum, sgp130_serum, kdegsgp130);
  reaction_146: => IL6_gut; gut*function_39(ksynthIL6Gut, gut);
  reaction_147: IL6_gut => ; gut*function_40(kdegIL6Gut, IL6_gut, gut);
  reaction_148: CRP_serum => sR_serum + CRP_serum; serum*function_41(CRP_serum, serum, kRShedding);
  reaction_149: sgpFc_serum -> sgpFc_peripheral; kAbSerumToPeriph*sgpFc_serum - kAbPeriphToSerum*sgpFc_peripheral;
  reaction_150: sgpFc_serum + sR_IL6_serum -> sR_IL6_sgpFc_serum; serum*function_42(kgp130Off, kgp130On, sR_IL6_serum, serum, sR_IL6_sgpFc_serum, sgpFc_serum);
  reaction_151: sR_IL6_sgpFc_serum => ; serum*function_43(serum, sR_IL6_sgpFc_serum, kdegAb);
  reaction_152: sgpFc_serum => ; serum*function_44(serum, kdegAb, sgpFc_serum);
  reaction_153: sR_IL6_sgpFc_gut => ; gut*function_45(sR_IL6_sgpFc_gut, kdegAb, gut);
  reaction_154: sgpFc_gut + sR_IL6_gut -> sR_IL6_sgpFc_gut; gut*function_46(kgp130Off, kgp130On, sR_IL6_sgpFc_gut, sR_IL6_gut, gut, sgpFc_gut);
  reaction_155: sgpFc_liver + sR_IL6_liver -> sR_IL6_sgpFc_liver; liver*function_47(kgp130Off, kgp130On, sR_IL6_sgpFc_liver, sgpFc_liver, sR_IL6_liver, liver);
  reaction_156: sR_IL6_sgpFc_liver => ; liver*function_48(sR_IL6_sgpFc_liver, liver, kdegAb);
  reaction_157: sgpFc_serum -> sgpFc_liver; kAbSerumToLiver*sgpFc_serum - kAbLiverToSerum*sgpFc_liver;
  reaction_158: sgpFc_serum -> sgpFc_gut; kAbSerumToGut*sgpFc_serum - kAbGutToSerum*sgpFc_gut;
  reaction_159: sR_IL6_sgpFc_serum -> sR_IL6_sgpFc_liver; kAbSerumToLiver*sR_IL6_sgpFc_serum - kAbLiverToSerum*sR_IL6_sgpFc_liver;
  reaction_160: sR_IL6_sgpFc_serum -> sR_IL6_sgpFc_gut; kAbSerumToGut*sR_IL6_sgpFc_serum - kAbGutToSerum*sR_IL6_sgpFc_gut;
  reaction_161: sgpFc_liver => ; liver*function_49(sgpFc_liver, liver, kdegAb);
  reaction_162: sgpFc_gut => ; gut*function_50(kdegAb, gut, sgpFc_gut);

  // Events:
  Week1: at (time >= 168), fromTrigger=false: sgpFc_serum = sgpFc_serum + Initial_for_Dose_Q1W*2.346;
  Week2: at (time >= 336), fromTrigger=false: sgpFc_serum = sgpFc_serum + Initial_for_Dose_Q1W*2.346 + Initial_for_Dose_Q2W*2.346;
  Week3: at (time >= 504), fromTrigger=false: sgpFc_serum = sgpFc_serum + Initial_for_Dose_Q1W*2.346;
  Week4: at (time >= 672), fromTrigger=false: sgpFc_serum = sgpFc_serum + (Initial_for_Dose_Q1W + Initial_for_Dose_Q2W + Initial_for_Dose_Q4W)*2.346;
  Week5: at (time >= 840), fromTrigger=false: sgpFc_serum = sgpFc_serum + Initial_for_Dose_Q1W*2.346;
  Week6: at (time >= 1008), fromTrigger=false: sgpFc_serum = sgpFc_serum + (Initial_for_Dose_Q1W + Initial_for_Dose_Q2W)*2.346;
  Week7: at (time >= 1176), fromTrigger=false: sgpFc_serum = sgpFc_serum + Initial_for_Dose_Q1W*2.346;
  Week8: at (time >= 1344), fromTrigger=false: sgpFc_serum = sgpFc_serum + (Initial_for_Dose_Q1W + Initial_for_Dose_Q2W + Initial_for_Dose_Q4W)*2.346;
  Week9: at (time >= 1512), fromTrigger=false: sgpFc_serum = sgpFc_serum + Initial_for_Dose_Q1W*2.346;
  Week10: at (time >= 1680), fromTrigger=false: sgpFc_serum = sgpFc_serum + (Initial_for_Dose_Q1W + Initial_for_Dose_Q2W)*2.346;
  Week11: at (time >= 1848), fromTrigger=false: sgpFc_serum = sgpFc_serum + Initial_for_Dose_Q1W*2.346;
  Week12: at (time >= 2016), fromTrigger=false: sgpFc_serum = sgpFc_serum + (Initial_for_Dose_Q1W + Initial_for_Dose_Q2W + Initial_for_Dose_Q4W)*2.346;
  Week0: at (time >= 0.1), fromTrigger=false: sgpFc_serum = sgpFc_serum + Initial_for_Dose_Q1W*2.346 + Initial_for_Dose_Q2W*2.346 + Initial_for_Dose_Q4W*2.346;

  // Unit definitions:
  unit time = 3600 second;
  unit substance = 1e-9 mole;
end
