// SBML level 2 version 4
// This model was downloaded from BioModels Database
// http://www.ebi.ac.uk/biomodels/

function Constant_flux__irreversible(v)
  v;
end
Constant_flux__irreversible is "Constant flux (irreversible)";

function Loss_of_intracellular_choline_0(k1, a, b)
  k1*a*b;
end

function Effect_of_extracellular_ACh_0(k3, a)
  k3*a;
end

function Decrease_in_the_extracellular_concentration_of_beta_amyloid_0(k4, b)
  k4*b;
end
Decrease_in_the_extracellular_concentration_of_beta_amyloid_0 is "Decrease in the extracellular concentration of beta-amyloid";

model MODEL1410200001()
  // Ehrenstein2000 - Positive-Feedback model for the loss of acetylcholine in Alzheimer's disease
  // Curated model derived from
  // BIOMD0000000553
  // This model is described in the article:
  // A positive-feedback model for the loss of acetylcholine in Alzheimer's disease.
  // Ehrenstein G, Galdzicki Z, Lange GD.
  // Ann. N. Y. Acad. Sci. 2000; 899: 283-291
  // Abstract:
  // We describe a two-component positive-feedback system that could account for the large reduction of acetylcholine that is characteristic of patients with Alzheimer's disease (AD). One component is beta-amyloid-induced apoptosis of cholinergic cells, leading to a decrease in acetylcholine. The other component is an increase in the concentration of beta-amyloid in response to a decrease in acetylcholine. We describe each mechanism with a differential equation, and then solve the two equations numerically. The solution provides a description of the time course of the reduction of acetylcholine in AD patients that is consistent with epidemiological data. This model may also provide an explanation for the significant, but lesser, decrease of other neurotransmitters that is characteristic of AD.
  // This model is hosted on BioModels Database and identified by: BIOMD0000000552.
  // To cite BioModels Database, please use: BioModels Database: An enhanced, curated and annotated resource for published quantitative kinetic models.
  // To the extent possible under law, all copyright and related or neighbouring rights to this encoded model have been dedicated to the public domain worldwide. Please refer to CC0 Public Domain Dedication for more information.
  // biomodels.db:MODEL1410200001
  // biomodels.db:BIOMD0000000552
  // isDescribedBy pubmed:10863547
  // isDerivedFrom biomodels.db:BIOMD0000000553 pubmed:9284295
  // hasTaxon taxonomy:9606
  // isVersionOf GO:0008292

  // Compartments:
  compartment Brain = 1;  // BTO:0000142

  // Species:
  // Extracellular concentration of Acetylcholine (ACh)
  species a in Brain = 50;  // CHEBI:15355
  // Extracellular concentration of β-amyloid
  species b in Brain = 0;  // uniprot:P05067
  // Relative concentration of Acetylcholine
  species $aRel in Brain;  // CHEBI:15355

  // Parameters:
  // Production rate of ACh
  k1 = 0.007;
  // Formation of β-amyloid from APP
  k2 = 0.33;
  // Effect of extracellular ACh
  k3 = 0.0042;
  // Intracellular concentration of β-amyloid rate
  k4 = 0.01;

  // Assignment rules:
  aRel := a/50;

  // Reactions:
  Loss_of_intracellular_choline: a => ; Brain*Loss_of_intracellular_choline_0(k1, a, b);  // modifiers: b
  Abeta_formation_from_APP: => b; Brain*Constant_flux__irreversible(k2);
  Effect_of_extracellular_ACh: b => ; Brain*Effect_of_extracellular_ACh_0(k3, a);  // modifiers: a
  Decrease_in_the_extracellular_concentration_of_beta_amyloid: b => ; Brain*Decrease_in_the_extracellular_concentration_of_beta_amyloid_0(k4, b); Decrease_in_the_extracellular_concentration_of_beta_amyloid is "Decrease in the extracellular concentration of beta-amyloid";

  // Unit definitions:
  unit volume = 1e-3 litre;
  unit time = 86400 second;
  unit substance = 1e-3 mole;
end
